<?xml version="1.0"?>
<?xml-stylesheet type="text/xsl" href="/JSBSim.xsl"?>
<fdm_config name="Mirage2000" version="2.0" release="DEVELOPMENT"
   xmlns:xsi="http://www.w3.org/2001/XMLSchema-instance"
   xsi:noNamespaceSchemaLocation="http://jsbsim.sourceforge.net/JSBSim.xsd">

    <fileheader>
        <author>Richard Harrison</author>
        <filecreationdate>2018-03-26</filecreationdate>
        <version>1.0</version>
        <copyright>Copyright (C) 2017 Richard Harrison, All rights reserved</copyright>
        <description>Dassault Mirage2000 Aerodynamic data built from vspaero; CG (7.5, 0, 0.508)M, 2018-03-26 08:22</description>
        <note>Built using VSPAERO. VSPAero control sub surfaces are used for the elevons, slats and rudder. These are all then processed and this data is built from the results (together with the -stab to get the derivatives)</note>
        <note>Aircraft origin for measurements is the nose</note>
        <note>VSPAERO notes: Rudder deflection is LE right. Elevator is TE down.</note>
        <note>Cl max 1.6</note>
        <note>Built with AeroTool 1.0.0.0: Options: AeroDetail=Full, Gear, Flaps, WingAsymmetry, HTailAsymmetry, VTailDamage, WakeIterations=1</note>
        <limitation></limitation>
        <reference
            refID="ZDAT/AED/2017/09-08"
            author="Richard Harrison, rjh@zaretto.com"
            title="Mirage 2000 Aerodynamic data built from vspaero; CG (7.5, 0, 0.508)M"
            date="September, 2017"
            URL="http://www.zaretto.com/sites/zaretto.com/files/Mirage2000-data-data/rjh-zaretto-Mirage2000-aerodynamic-data-vspaero.pdf"
        />
        <reference
            refID="VSPAERO"
            author="Brandon Litherland"
            title="Using VSPAERO"
            date=" 2015/07/01 06:56"
            URL="http://www.openvsp.org/wiki/doku.php?id=vspaerotutorial"
        />
    </fileheader>
<metrics>
  <wingarea unit="M2">41.038</wingarea>
  <wing_incidence unit="DEG">0</wing_incidence>
  <wingspan unit="M">9.13</wingspan>
  <chord unit="M">4.495</chord>
  <location unit="IN" name="EYEPOINT">
    <x>197</x>
    <y>0</y>
    <z>-3.94</z>
  </location>
  <location unit="IN" name="VRP">
    <x>200</x>
    <y>0</y>
    <z>0</z>
  </location>
  <location unit="M" name="AERORP">
    <x>7.5</x>
    <y>0</y>
    <z>0.508</z>
  </location>
</metrics>

<mass_balance>
  <location unit="M" name="CG">
    <x>7.5</x>
    <y>0</y>
    <z>0.508</z>
  </location>
  <ixx unit="KG*M2">6262</ixx>
  <iyy unit="KG*M2">75686</iyy>
  <izz unit="KG*M2">78802</izz>
  <ixz unit="KG*M2">2141</ixz>
  <emptywt unit="LBS">28000</emptywt>
</mass_balance>

<ground_reactions>
  <contact type="BOGEY" name="NOSE_LG">
    <location unit="M">
      <x>3.5</x>
      <y>0</y>
      <z>-1.032</z>
    </location>
    <static_friction>1.0</static_friction>
    <dynamic_friction>0.5</dynamic_friction>
    <rolling_friction>0.02</rolling_friction>
    <spring_coeff unit="LBS/FT">25200</spring_coeff>
    <damping_coeff unit="LBS/FT/SEC">1400</damping_coeff>
    <max_steer unit="DEG">35</max_steer>
    <!--0: NOSE_LG-->
    <brake_group>NOSE</brake_group>
    <retractable>1</retractable>
  </contact>
  <contact type="BOGEY" name="LEFT_MLG">
    <location unit="M">
      <x>8.007</x>
      <y>-1.631</y>
      <z>-1.032</z>
    </location>
    <static_friction>1.0</static_friction>
    <dynamic_friction>0.5</dynamic_friction>
    <rolling_friction>0.02</rolling_friction>
    <spring_coeff unit="LBS/FT">25200</spring_coeff>
    <damping_coeff unit="LBS/FT/SEC">1400</damping_coeff>
    <max_steer unit="DEG">0</max_steer>
    <!--1: LEFT_MLG-->
    <brake_group>LEFT</brake_group>
    <retractable>1</retractable>
  </contact>
  <contact type="BOGEY" name="RIGHT_MLG">
    <location unit="M">
      <x>8.007</x>
      <y>1.631</y>
      <z>-1.032</z>
    </location>
    <static_friction>1.0</static_friction>
    <dynamic_friction>0.5</dynamic_friction>
    <rolling_friction>0.02</rolling_friction>
    <spring_coeff unit="LBS/FT">25200</spring_coeff>
    <damping_coeff unit="LBS/FT/SEC">1400</damping_coeff>
    <max_steer unit="DEG">0</max_steer>
    <!--2: RIGHT_MLG-->
    <brake_group>RIGHT</brake_group>
    <retractable>1</retractable>
  </contact>
  <contact type="STRUCTURE" name="LEFT_WING_TIP">
    <!--3: LEFT_WING_TIP-->
    <location unit="M">
      <x>12.09</x>
      <y>-6.9074</y>
      <z>-0.388</z>
    </location>
    <static_friction>1.2</static_friction>
    <dynamic_friction>1.212</dynamic_friction>
    <rolling_friction>1.413</rolling_friction>
    <spring_coeff unit="LBS/FT">25200</spring_coeff>
    <damping_coeff unit="LBS/FT/SEC">5600</damping_coeff>
  </contact>
  <contact type="STRUCTURE" name="RIGHT_WING_TIP">
    <!--4: RIGHT_WING_TIP-->
    <location unit="M">
      <x>12.09</x>
      <y>6.9074</y>
      <z>-0.388</z>
    </location>
    <static_friction>1.2</static_friction>
    <dynamic_friction>1.212</dynamic_friction>
    <rolling_friction>1.413</rolling_friction>
    <spring_coeff unit="LBS/FT">25200</spring_coeff>
    <damping_coeff unit="LBS/FT/SEC">5600</damping_coeff>
  </contact>
  <contact type="STRUCTURE" name="CANOPY">
    <!--5: CANOPY-->
    <location unit="M">
      <x>5.08</x>
      <y>0</y>
      <z>1.338</z>
    </location>
    <static_friction>1.2</static_friction>
    <dynamic_friction>1.212</dynamic_friction>
    <rolling_friction>1.413</rolling_friction>
    <spring_coeff unit="LBS/FT">25200</spring_coeff>
    <damping_coeff unit="LBS/FT/SEC">5600</damping_coeff>
  </contact>
  <contact type="STRUCTURE" name="RADOME_FRONT">
    <!--6: RADOME_FRONT-->
    <location unit="M">
      <x>0</x>
      <y>0</y>
      <z>-0.508</z>
    </location>
    <static_friction>1.2</static_friction>
    <dynamic_friction>1.212</dynamic_friction>
    <rolling_friction>1.413</rolling_friction>
    <spring_coeff unit="LBS/FT">25200</spring_coeff>
    <damping_coeff unit="LBS/FT/SEC">5600</damping_coeff>
  </contact>
  <contact type="STRUCTURE" name="VERTICAL_TAIL">
    <!--7: VERTICAL_TAIL-->
    <location unit="M">
      <x>18</x>
      <y>0</y>
      <z>2.308</z>
    </location>
    <static_friction>1.2</static_friction>
    <dynamic_friction>1.212</dynamic_friction>
    <rolling_friction>1.413</rolling_friction>
    <spring_coeff unit="LBS/FT">25200</spring_coeff>
    <damping_coeff unit="LBS/FT/SEC">5600</damping_coeff>
  </contact>
  <contact type="STRUCTURE" name="REAR_BODY_LEFT">
    <!--8: REAR_BODY_LEFT-->
    <location unit="M">
      <x>16.53</x>
      <y>0.94</y>
      <z>-0.315</z>
    </location>
    <static_friction>1.2</static_friction>
    <dynamic_friction>1.212</dynamic_friction>
    <rolling_friction>1.413</rolling_friction>
    <spring_coeff unit="LBS/FT">25200</spring_coeff>
    <damping_coeff unit="LBS/FT/SEC">5600</damping_coeff>
  </contact>
  <contact type="STRUCTURE" name="REAR_BODY_RIGHT">
    <!--9: REAR_BODY_RIGHT-->
    <location unit="M">
      <x>16.53</x>
      <y>0.94</y>
      <z>-0.315</z>
    </location>
    <static_friction>1.2</static_friction>
    <dynamic_friction>1.212</dynamic_friction>
    <rolling_friction>1.413</rolling_friction>
    <spring_coeff unit="LBS/FT">25200</spring_coeff>
    <damping_coeff unit="LBS/FT/SEC">5600</damping_coeff>
  </contact>
</ground_reactions>

<propulsion>
  <engine file="SNECMA_M53-P2">
    <location unit="M">
      <x>17.05</x>
      <y>0</y>
      <z>0.108</z>
    </location>
    <orient unit="DEG">
      <roll>0</roll>
      <pitch>0</pitch>
      <yaw>0</yaw>
    </orient>
    <feed>0</feed>
    <feed>1</feed>
    <feed>2</feed>
    <feed>3</feed>
    <feed>4</feed>
    <thruster file="direct">
      <location unit="M">
        <x>17.05</x>
        <y>0</y>
        <z>0.108</z>
      </location>
      <orient unit="DEG">
        <roll>0</roll>
        <pitch>0</pitch>
        <yaw>0</yaw>
      </orient>
    </thruster>
  </engine>
  <tank number="0" type="FUEL">
    <!--0: Main Tank-->
    <location unit="M">
      <x>7.5</x>
      <y>0</y>
      <z>0.508</z>
    </location>
    <capacity unit="KG">2128</capacity>
    <standpipe unit="KG">50</standpipe>
    <contents unit="KG">2128</contents>
    <priority>8</priority>
  </tank>
  <tank number="1" type="FUEL">
    <!--1: Right Wing Tank-->
    <location unit="M">
      <x>7.5</x>
      <y>4</y>
      <z>0.508</z>
    </location>
    <capacity unit="LBS">385</capacity>
    <standpipe unit="LBS">100</standpipe>
    <contents unit="LBS">385</contents>
    <priority>7</priority>
  </tank>
  <tank number="2" type="FUEL">
    <!--2: Left Wing Tank-->
    <location unit="M">
      <x>7.5</x>
      <y>-4</y>
      <z>0.508</z>
    </location>
    <capacity unit="LBS">385</capacity>
    <standpipe unit="LBS">100</standpipe>
    <contents unit="LBS">385</contents>
    <priority>7</priority>
  </tank>
  <tank number="3" type="FUEL">
    <!--3: External Tank-->
    <location unit="M">
      <x>7.5</x>
      <y>0</y>
      <z>0.00800000000000001</z>
    </location>
    <capacity unit="KG">1200</capacity>
    <standpipe unit="KG">50</standpipe>
    <contents unit="KG">1200</contents>
    <priority>3</priority>
  </tank>
  <tank number="4" type="FUEL">
    <!--4: Feed line-->
    <location unit="M">
      <x>7.5</x>
      <y>0</y>
      <z>0.508</z>
    </location>
    <capacity unit="LBS">10</capacity>
    <contents unit="LBS">10</contents>
    <priority>2</priority>
  </tank>
</propulsion>

<external_reactions>
  <force name="catapult" frame="BODY">
    <location unit="IN">
      <x>667</x>
      <y>0</y>
      <z>0</z>
    </location>
    <direction>
      <x>1</x>
      <y>0</y>
      <z>0</z>
    </direction>
  </force>
  <force name="holdback" frame="BODY">
    <location unit="IN">
      <x>667</x>
      <y>0</y>
      <z>0</z>
    </location>
    <direction>
      <x>-1</x>
      <y>0</y>
      <z>0</z>
    </direction>
  </force>
  <force name="hook" frame="BODY">
    <location unit="IN">
      <x>300</x>
      <y>0</y>
      <z>0</z>
    </location>
    <direction>
      <x>-0.9995</x>
      <y>0</y>
      <z>0.01</z>
    </direction>
  </force>
</external_reactions>

<flight_control name="Mirage2000-FCS">
       <property value="7.5">metrics/cg-x-m</property>
       <property value="0.508">metrics/cg-z-m</property>
  <channel name="extra-aero">
        <!-- need %Cg in chord for moments [Xcg - Xref)/100] -->
        <summer name="cg-x-offset-chord-in">
            <input> inertia/cg-x-in</input>
            <input> -metrics/aero-rp-x-in</input>
            <output>inertia/cg-x-offset-chord-in</output>
        </summer>

        <!-- figure out the factor for the fuel tank aero -->
        <pure_gain name="cg-x-chord-percent">
            <description>Percent offset of the CoP from the CG</description>
            <input>inertia/cg-x-offset-chord-in</input>
            <gain> -0.01</gain>
            <clipto>
                <min> -1 </min>
                <max> 1 </max>
            </clipto>
            <output> inertia/cg-x-mac-percent </output>
        </pure_gain>

        <fcs_function name="pb">
            <description>PB Denormalization</description>
            <function>
                <quotient>
                    <product>
                        <property>metrics/bw-ft</property>
                        <property>velocities/p-aero-rad_sec</property>
                    </product>
                    <!-- over -->
                    <product>
                        <value>2</value>
                        <property>velocities/vt-fps</property>
                    </product>
                </quotient>
            </function>
            <clipto>
                <min> -1.00 </min>
                <max>  1.00 </max>
            </clipto>
            <output>aero/pb</output>
        </fcs_function>

        <fcs_function name="cbarq-2vo">
            <description>For denormalization</description>
            <function>
                <quotient>
                    <product>
                        <property>metrics/cbarw-ft</property>
                        <property>velocities/q-aero-rad_sec</property>
                    </product>
                    <!-- over -->
                    <product>
                        <value>2</value>
                        <property>velocities/vt-fps</property>
                    </product>
                </quotient>
            </function>
            <clipto>
                <min> -2.01 </min>
                <max>  2.01 </max>
            </clipto>
            <output>aero/qb</output>
        </fcs_function>

        <fcs_function name="rb-2vo">
            <description>For denormalization</description>
            <function>
                <quotient>
                    <product>
                        <property>metrics/bw-ft</property>
                        <property>velocities/r-aero-rad_sec</property>
                    </product>
                    <!-- over -->
                    <product>
                        <value>2</value>
                        <property>velocities/vt-fps</property>
                    </product>
                </quotient>
            </function>
            <clipto>
                <min> -1.00 </min>
                <max>  1.00 </max>
            </clipto>
            <output>aero/rb</output>
        </fcs_function>


        <fcs_function name="aero-cos-alpha">
            <function>
                <product>
                    <cos>
                        <property>aero/alpha-rad</property>
                    </cos>
                </product>
            </function>
            <output>aero/cos-alpha</output>
        </fcs_function>

        <fcs_function name="aero-sin-alpha">
            <function>
                <product>
                    <sin>
                        <property>aero/alpha-rad</property>
                    </sin>
                </product>
            </function>
            <output>aero/sin-alpha</output>
        </fcs_function>
       <pure_gain name="aero/alphadot-rad_sec-limited">
               <input>aero/alphadot-rad_sec</input>
               <output>aero/alphadot-rad_sec-limited</output>
               <gain>1</gain>
               <clipto>
                   <min> -0.2</min>
                   <max> 0.2</max>
               </clipto>
           </pure_gain>
           <pure_gain name="aero/betadot-rad_sec-limited">
               <input>aero/betadot-rad_sec</input>
               <output>aero/betadot-rad_sec-limited</output>
               <gain>1</gain>
               <clipto>
                   <min> -0.1</min>
                   <max> 0.1</max>
               </clipto>
           </pure_gain>
       </channel>
</flight_control>
<system file="Mirage-2000-hydraulics"/>
<system file="Mirage-2000-electrics"/>
<system file="Mirage-2000-avionics"/>
<system file="Mirage-2000-ecs"/>
<system file="Mirage-2000-fcs"/>
<aerodynamics>
    <function name="aero/c/CfMDDED1LZ">
    <description>ELEVON 1 DIFFERENTIAL DEFLECTION PITCH FOR ZERO ROLL</description>
    <product>
          <table>
            <independentVar lookup="row">aero/alpha-deg</independentVar>
            <independentVar lookup="column">fcs/elevon-1L-pos-deg</independentVar>
            <tableData>
                                -25	        -20	        -16	        -15	        -10	         -5	          0	          5	         10	         13	         16
                    -10	     16.000	     16.000	     15.789	     15.194	      7.819	      4.436	      0.000	    -5.784	   -11.471	   -13.526	   -16.371
                     -5	     16.000	     16.000	     16.000	     16.000	      7.440	      4.070	      0.000	    -6.297	   -12.056	   -14.380	   -13.760
                     -2	     16.000	     16.000	     14.742	     13.766	      9.200	      3.796	      0.000	    -6.151	   -10.987	   -14.250	   -17.345
                      0	     16.000	     16.000	     16.000	     16.000	     11.179	      5.051	      0.000	    -4.946	    -9.028	   -11.773	   -14.624
                      1	     16.000	     13.458	     11.535	     11.085	      8.004	      4.941	      0.000	    -5.093	   -12.747	   -19.327	   -24.079
                      2	     16.000	     16.000	     16.000	     16.000	     12.903	      8.370	      0.000	    -3.018	    -6.781	   -10.125	   -13.948
                      3	     16.000	     16.000	     16.000	     16.000	     12.100	      5.853	      0.000	    -4.306	    -8.310	   -10.825	   -13.551
                      4	     16.000	     16.000	     16.000	     16.000	     12.530	      5.862	      0.000	    -4.317	    -8.115	   -10.380	   -12.785
                      5	     16.000	     16.000	     16.000	     16.000	     12.711	      5.842	      0.000	    -4.339	    -8.063	   -10.218	   -12.436
                      6	     16.000	     16.000	     16.000	     16.000	     12.708	      5.774	      0.000	    -4.390	    -8.104	   -10.211	   -12.320
                      7	     16.000	     16.000	     16.000	     16.000	     12.906	      5.801	      0.000	    -4.378	    -8.028	   -10.065	   -12.062
                      8	     16.000	     16.000	     16.000	     16.000	     12.779	      5.732	      0.000	    -4.425	    -8.112	   -10.152	   -12.116
                      9	     16.000	     16.000	     16.000	     16.000	     12.557	      5.656	      0.000	    -4.477	    -8.238	   -10.305	   -12.204
                     10	     16.000	     16.000	     16.000	     16.000	     13.034	      5.633	      0.000	    -4.508	    -8.183	    -9.981	   -11.665
                     11	     16.000	     10.550	     14.923	     13.287	      4.676	      2.268	      0.000	   -11.975	   -19.048	   -15.531	   -22.395
                     12	     16.000	     16.000	     16.000	     16.000	     15.209	     11.756	      0.000	    -2.179	    -4.280	    -5.494	   -11.981
                     13	     16.000	     16.000	     16.000	     16.000	     13.016	      7.337	      0.000	    -2.206	    -8.308	    -9.991	   -11.759
                     14	     16.000	     16.000	     14.047	     12.708	      6.233	      4.870	      0.000	    -5.791	   -12.944	   -15.232	   -17.497
                     15	     16.000	     16.000	     16.000	     16.000	     16.000	     13.010	      0.000	    -1.128	    -3.692	    -4.996	    -6.697
                     16	     16.000	     16.000	     16.000	     16.000	     15.856	     13.373	      0.000	    -0.988	    -3.202	    -4.506	   -10.283
                     17	     16.000	     16.000	     16.000	     16.000	     15.321	      8.948	      0.000	    -0.939	    -6.504	    -8.540	   -10.461
                     18	     16.000	     16.000	     16.000	     16.000	      8.877	      3.464	      0.000	    -6.754	   -10.851	   -12.764	   -14.527
                     19	     16.000	     16.000	     16.000	     16.000	      9.871	      3.763	      0.000	    -6.299	   -10.100	   -12.208	   -14.154
                     20	     16.000	     16.000	     16.000	     16.000	      9.118	      3.363	      0.000	    -6.742	   -10.685	   -12.803	   -14.748
                     22	     16.000	     16.000	     16.000	     16.000	      9.331	      3.412	      0.000	    -6.694	   -10.514	   -12.586	   -14.468
                     24	     16.000	     16.000	     16.000	     15.679	      8.422	      3.026	      0.000	    -7.279	   -11.253	   -13.327	   -15.202
                     25	     16.000	     16.000	     16.000	     16.000	     16.000	      9.352	      0.000	    -2.245	    -5.509	    -7.609	    -9.501
                     28	     16.000	     16.000	     16.000	     16.000	     16.000	     11.381	      0.000	    -1.564	    -4.323	    -6.100	    -7.928
                     30	     16.000	     16.000	     16.000	     16.000	     16.000	     12.925	      0.000	    -1.118	    -3.677	    -5.050	    -9.987
                     35	     16.000	     16.000	     16.000	     15.971	      7.611	      2.368	      0.000	    -8.145	   -11.646	   -13.445	   -15.015
                     45	     16.000	     16.000	     10.750	      8.913	      3.231	      0.153	      0.000	   -12.702	   -15.638	   -17.079	   -18.286
                     50	     16.000	     16.000	     16.000	     16.000	     16.000	     16.000	      0.000	     16.000	     16.000	     16.000	     16.000
                     55	     16.000	     16.000	     16.000	     16.000	     16.000	     16.000	      0.000	     16.000	     16.000	     16.000	     16.000
                     60	     16.000	     16.000	     16.000	     16.000	     16.000	     16.000	      0.000	     16.000	     16.000	     16.000	     16.000
            </tableData>
          </table>
       </product>
    </function>
    <function name="aero/c/CFXB">
    <description>BASIC DRAG</description>
    <product>
          <table>
            <independentVar lookup="row">aero/alpha-deg</independentVar>
            <tableData>
                    -10		    0.04579
                     -5		    0.02709
                     -2		    0.02171
                      0		    0.02058
                      1		    0.02068
                      2		    0.02127
                      3		    0.02225
                      4		    0.02371
                      5		    0.02564
                      6		    0.02804
                      7		    0.03091
                      8		    0.03426
                      9		    0.03807
                     10		    0.04236
                     11		    0.04712
                     12		    0.05596
                     13		    0.06191
                     14		    0.06821
                     15		    0.07753
                     16		    0.08445
                     17		    0.09129
                     18		    0.09815
                     19		    0.10522
                     20		    0.11180
                     22		    0.12501
                     24		    0.13698
                     25		    0.14521
                     28		    0.15861
                     30		    0.16585
                     35		    0.18000
                     45		    0.19821
                     50		    0.20692
                     55		    0.21415
                     60		    0.22315
            </tableData>
          </table>
       </product>
    </function>
    <function name="aero/c/CFXDED1L">
    <description>DRAG DUE TO ELEVON 1L</description>
    <product>
          <table>
            <independentVar lookup="row">aero/alpha-deg</independentVar>
            <independentVar lookup="column">fcs/elevon-1L-pos-deg</independentVar>
            <tableData>
                                -25	        -20	        -16	        -15	        -10	         -5	          0	          5	         10	         13	         16
                    -10	    0.01262	    0.01073	    0.00898	    0.00854	    0.00424	    0.00214	    0.00000	    0.00000	    0.00000	    0.00000	    0.00000
                     -5	    0.00818	    0.00649	    0.00510	    0.00476	    0.00244	    0.00113	    0.00000	    0.00000	    0.00000	    0.00000	    0.00000
                     -2	    0.00530	    0.00399	    0.00296	    0.00271	    0.00157	    0.00053	    0.00000	    0.00000	    0.00000	    0.00002	    0.00033
                      0	    0.00326	    0.00225	    0.00150	    0.00133	    0.00060	    0.00012	    0.00000	    0.00014	    0.00056	    0.00095	    0.00142
                      1	    0.00222	    0.00143	    0.00088	    0.00076	    0.00023	    0.00000	    0.00000	    0.00030	    0.00093	    0.00159	    0.00221
                      2	    0.00151	    0.00083	    0.00036	    0.00025	    0.00000	    0.00000	    0.00000	    0.00053	    0.00138	    0.00203	    0.00276
                      3	    0.00077	    0.00013	    0.00000	    0.00000	    0.00000	    0.00000	    0.00000	    0.00073	    0.00174	    0.00248	    0.00330
                      4	    0.00000	    0.00000	    0.00000	    0.00000	    0.00000	    0.00000	    0.00000	    0.00091	    0.00207	    0.00290	    0.00379
                      5	    0.00000	    0.00000	    0.00000	    0.00000	    0.00000	    0.00000	    0.00000	    0.00109	    0.00242	    0.00332	    0.00429
                      6	    0.00000	    0.00000	    0.00000	    0.00000	    0.00000	    0.00000	    0.00000	    0.00129	    0.00278	    0.00376	    0.00479
                      7	    0.00000	    0.00000	    0.00000	    0.00000	    0.00000	    0.00000	    0.00000	    0.00149	    0.00314	    0.00419	    0.00529
                      8	    0.00000	    0.00000	    0.00000	    0.00000	    0.00000	    0.00000	    0.00000	    0.00168	    0.00350	    0.00465	    0.00582
                      9	    0.00000	    0.00000	    0.00000	    0.00000	    0.00000	    0.00000	    0.00000	    0.00189	    0.00389	    0.00513	    0.00636
                     10	    0.00000	    0.00000	    0.00000	    0.00000	    0.00000	    0.00000	    0.00000	    0.00209	    0.00423	    0.00550	    0.00676
                     11	    0.00000	    0.00000	    0.00000	    0.00000	    0.00000	    0.00000	    0.00000	    0.00487	    0.00672	    0.00805	    0.00943
                     12	    0.00000	    0.00000	    0.00000	    0.00000	    0.00000	    0.00000	    0.00000	    0.00176	    0.00369	    0.00494	    0.00926
                     13	    0.00000	    0.00000	    0.00000	    0.00000	    0.00000	    0.00000	    0.00000	    0.00189	    0.00651	    0.00807	    0.00959
                     14	    0.00000	    0.00000	    0.00000	    0.00000	    0.00000	    0.00000	    0.00000	    0.00400	    0.00666	    0.00827	    0.00982
                     15	    0.00000	    0.00000	    0.00000	    0.00000	    0.00000	    0.00000	    0.00000	    0.00131	    0.00400	    0.00550	    0.00695
                     16	    0.00000	    0.00000	    0.00000	    0.00000	    0.00000	    0.00000	    0.00000	    0.00122	    0.00375	    0.00528	    0.00925
                     17	    0.00000	    0.00000	    0.00000	    0.00000	    0.00000	    0.00000	    0.00000	    0.00111	    0.00622	    0.00782	    0.00934
                     18	    0.00000	    0.00000	    0.00000	    0.00000	    0.00000	    0.00000	    0.00000	    0.00356	    0.00632	    0.00779	    0.00918
                     19	    0.00000	    0.00000	    0.00000	    0.00000	    0.00000	    0.00000	    0.00000	    0.00347	    0.00608	    0.00755	    0.00893
                     20	    0.00000	    0.00000	    0.00000	    0.00000	    0.00000	    0.00000	    0.00000	    0.00350	    0.00613	    0.00761	    0.00900
                     22	    0.00000	    0.00000	    0.00000	    0.00000	    0.00000	    0.00000	    0.00000	    0.00343	    0.00583	    0.00717	    0.00841
                     24	    0.00000	    0.00000	    0.00000	    0.00000	    0.00000	    0.00000	    0.00000	    0.00361	    0.00596	    0.00720	    0.00834
                     25	    0.00000	    0.00000	    0.00000	    0.00000	    0.00000	    0.00000	    0.00000	    0.00098	    0.00313	    0.00431	    0.00540
                     28	    0.00000	    0.00000	    0.00000	    0.00000	    0.00000	    0.00000	    0.00000	    0.00072	    0.00268	    0.00376	    0.00473
                     30	    0.00000	    0.00000	    0.00000	    0.00000	    0.00000	    0.00000	    0.00000	    0.00051	    0.00241	    0.00344	    0.00644
                     35	    0.00000	    0.00000	    0.00000	    0.00000	    0.00000	    0.00000	    0.00000	    0.00268	    0.00427	    0.00510	    0.00584
                     45	    0.00000	    0.00000	    0.00000	    0.00000	    0.00000	    0.00000	    0.00000	    0.00254	    0.00373	    0.00432	    0.00482
                     50	    0.00000	    0.00000	    0.00000	    0.00000	    0.00000	    0.00000	    0.00000	    0.00000	    0.00078	    0.00124	    0.00162
                     55	    0.00000	    0.00000	    0.00000	    0.00000	    0.00000	    0.00000	    0.00000	    0.00000	    0.00022	    0.00059	    0.00087
                     60	    0.00000	    0.00000	    0.00000	    0.00000	    0.00000	    0.00000	    0.00000	    0.00000	    0.00000	    0.00000	    0.00012
            </tableData>
          </table>
       </product>
    </function>
    <function name="aero/c/CFXDED1R">
    <description>DRAG DUE TO ELEVON 1R</description>
    <product>
          <table>
            <independentVar lookup="row">aero/alpha-deg</independentVar>
            <independentVar lookup="column">fcs/elevon-1R-pos-deg</independentVar>
            <tableData>
                                -25	        -20	        -16	        -15	        -10	         -5	          0	          5	         10	         13	         16
                    -10	    0.01262	    0.01073	    0.00898	    0.00854	    0.00424	    0.00214	    0.00000	    0.00000	    0.00000	    0.00000	    0.00000
                     -5	    0.00818	    0.00649	    0.00510	    0.00476	    0.00244	    0.00113	    0.00000	    0.00000	    0.00000	    0.00000	    0.00000
                     -2	    0.00530	    0.00399	    0.00296	    0.00271	    0.00157	    0.00053	    0.00000	    0.00000	    0.00000	    0.00002	    0.00033
                      0	    0.00326	    0.00225	    0.00150	    0.00133	    0.00060	    0.00012	    0.00000	    0.00014	    0.00056	    0.00095	    0.00142
                      1	    0.00222	    0.00143	    0.00088	    0.00076	    0.00023	    0.00000	    0.00000	    0.00030	    0.00093	    0.00159	    0.00221
                      2	    0.00151	    0.00083	    0.00036	    0.00025	    0.00000	    0.00000	    0.00000	    0.00053	    0.00138	    0.00203	    0.00276
                      3	    0.00077	    0.00013	    0.00000	    0.00000	    0.00000	    0.00000	    0.00000	    0.00073	    0.00174	    0.00248	    0.00330
                      4	    0.00000	    0.00000	    0.00000	    0.00000	    0.00000	    0.00000	    0.00000	    0.00091	    0.00207	    0.00290	    0.00379
                      5	    0.00000	    0.00000	    0.00000	    0.00000	    0.00000	    0.00000	    0.00000	    0.00109	    0.00242	    0.00332	    0.00429
                      6	    0.00000	    0.00000	    0.00000	    0.00000	    0.00000	    0.00000	    0.00000	    0.00129	    0.00278	    0.00376	    0.00479
                      7	    0.00000	    0.00000	    0.00000	    0.00000	    0.00000	    0.00000	    0.00000	    0.00149	    0.00314	    0.00419	    0.00529
                      8	    0.00000	    0.00000	    0.00000	    0.00000	    0.00000	    0.00000	    0.00000	    0.00168	    0.00350	    0.00465	    0.00582
                      9	    0.00000	    0.00000	    0.00000	    0.00000	    0.00000	    0.00000	    0.00000	    0.00189	    0.00389	    0.00513	    0.00636
                     10	    0.00000	    0.00000	    0.00000	    0.00000	    0.00000	    0.00000	    0.00000	    0.00209	    0.00423	    0.00550	    0.00676
                     11	    0.00000	    0.00000	    0.00000	    0.00000	    0.00000	    0.00000	    0.00000	    0.00487	    0.00672	    0.00805	    0.00943
                     12	    0.00000	    0.00000	    0.00000	    0.00000	    0.00000	    0.00000	    0.00000	    0.00176	    0.00369	    0.00494	    0.00926
                     13	    0.00000	    0.00000	    0.00000	    0.00000	    0.00000	    0.00000	    0.00000	    0.00189	    0.00651	    0.00807	    0.00959
                     14	    0.00000	    0.00000	    0.00000	    0.00000	    0.00000	    0.00000	    0.00000	    0.00400	    0.00666	    0.00827	    0.00982
                     15	    0.00000	    0.00000	    0.00000	    0.00000	    0.00000	    0.00000	    0.00000	    0.00131	    0.00400	    0.00550	    0.00695
                     16	    0.00000	    0.00000	    0.00000	    0.00000	    0.00000	    0.00000	    0.00000	    0.00122	    0.00375	    0.00528	    0.00925
                     17	    0.00000	    0.00000	    0.00000	    0.00000	    0.00000	    0.00000	    0.00000	    0.00111	    0.00622	    0.00782	    0.00934
                     18	    0.00000	    0.00000	    0.00000	    0.00000	    0.00000	    0.00000	    0.00000	    0.00356	    0.00632	    0.00779	    0.00918
                     19	    0.00000	    0.00000	    0.00000	    0.00000	    0.00000	    0.00000	    0.00000	    0.00347	    0.00608	    0.00755	    0.00893
                     20	    0.00000	    0.00000	    0.00000	    0.00000	    0.00000	    0.00000	    0.00000	    0.00350	    0.00613	    0.00761	    0.00900
                     22	    0.00000	    0.00000	    0.00000	    0.00000	    0.00000	    0.00000	    0.00000	    0.00343	    0.00583	    0.00717	    0.00841
                     24	    0.00000	    0.00000	    0.00000	    0.00000	    0.00000	    0.00000	    0.00000	    0.00361	    0.00596	    0.00720	    0.00834
                     25	    0.00000	    0.00000	    0.00000	    0.00000	    0.00000	    0.00000	    0.00000	    0.00098	    0.00313	    0.00431	    0.00540
                     28	    0.00000	    0.00000	    0.00000	    0.00000	    0.00000	    0.00000	    0.00000	    0.00072	    0.00268	    0.00376	    0.00473
                     30	    0.00000	    0.00000	    0.00000	    0.00000	    0.00000	    0.00000	    0.00000	    0.00051	    0.00241	    0.00344	    0.00644
                     35	    0.00000	    0.00000	    0.00000	    0.00000	    0.00000	    0.00000	    0.00000	    0.00268	    0.00427	    0.00510	    0.00584
                     45	    0.00000	    0.00000	    0.00000	    0.00000	    0.00000	    0.00000	    0.00000	    0.00254	    0.00373	    0.00432	    0.00482
                     50	    0.00000	    0.00000	    0.00000	    0.00000	    0.00000	    0.00000	    0.00000	    0.00000	    0.00078	    0.00124	    0.00162
                     55	    0.00000	    0.00000	    0.00000	    0.00000	    0.00000	    0.00000	    0.00000	    0.00000	    0.00022	    0.00059	    0.00087
                     60	    0.00000	    0.00000	    0.00000	    0.00000	    0.00000	    0.00000	    0.00000	    0.00000	    0.00000	    0.00000	    0.00012
            </tableData>
          </table>
       </product>
    </function>
    <function name="aero/c/CFXDED2L">
    <description>DRAG DUE TO ELEVON 2L</description>
    <product>
          <table>
            <independentVar lookup="row">aero/alpha-deg</independentVar>
            <independentVar lookup="column">fcs/elevon-2L-pos-deg</independentVar>
            <tableData>
                                -25	        -20	        -16	        -15	        -10	         -5	          0	          5	         10	         13	         16
                    -10	    0.01497	    0.01197	    0.00943	    0.00878	    0.00559	    0.00262	    0.00000	    0.00000	    0.00000	    0.00000	    0.00000
                     -5	    0.01032	    0.00796	    0.00606	    0.00559	    0.00338	    0.00145	    0.00000	    0.00000	    0.00000	    0.00000	    0.00000
                     -2	    0.00749	    0.00552	    0.00400	    0.00364	    0.00201	    0.00076	    0.00000	    0.00000	    0.00000	    0.00027	    0.00083
                      0	    0.00550	    0.00383	    0.00259	    0.00230	    0.00107	    0.00021	    0.00000	    0.00021	    0.00094	    0.00160	    0.00239
                      1	    0.00424	    0.00283	    0.00180	    0.00157	    0.00061	    0.00004	    0.00000	    0.00042	    0.00139	    0.00219	    0.00313
                      2	    0.00340	    0.00209	    0.00115	    0.00094	    0.00009	    0.00000	    0.00000	    0.00052	    0.00171	    0.00264	    0.00369
                      3	    0.00239	    0.00116	    0.00031	    0.00012	    0.00000	    0.00000	    0.00000	    0.00062	    0.00241	    0.00347	    0.00464
                      4	    0.00115	    0.00003	    0.00000	    0.00000	    0.00000	    0.00000	    0.00000	    0.00065	    0.00292	    0.00409	    0.00537
                      5	    0.00031	    0.00000	    0.00000	    0.00000	    0.00000	    0.00000	    0.00000	    0.00155	    0.00343	    0.00473	    0.00612
                      6	    0.00000	    0.00000	    0.00000	    0.00000	    0.00000	    0.00000	    0.00000	    0.00186	    0.00396	    0.00537	    0.00687
                      7	    0.00000	    0.00000	    0.00000	    0.00000	    0.00000	    0.00000	    0.00000	    0.00217	    0.00452	    0.00607	    0.00769
                      8	    0.00000	    0.00000	    0.00000	    0.00000	    0.00000	    0.00000	    0.00000	    0.00249	    0.00503	    0.00669	    0.00840
                      9	    0.00000	    0.00000	    0.00000	    0.00000	    0.00000	    0.00000	    0.00000	    0.00284	    0.00560	    0.00737	    0.00919
                     10	    0.00000	    0.00000	    0.00000	    0.00000	    0.00000	    0.00000	    0.00000	    0.00323	    0.00622	    0.00813	    0.01008
                     11	    0.00000	    0.00000	    0.00000	    0.00000	    0.00000	    0.00000	    0.00000	    0.00369	    0.00687	    0.00889	    0.01092
                     12	    0.00000	    0.00000	    0.00000	    0.00000	    0.00000	    0.00000	    0.00000	    0.00022	    0.00358	    0.00570	    0.00783
                     13	    0.00000	    0.00000	    0.00000	    0.00000	    0.00000	    0.00000	    0.00000	    0.00340	    0.00716	    0.00946	    0.01173
                     14	    0.00000	    0.00000	    0.00000	    0.00000	    0.00000	    0.00000	    0.00000	    0.00355	    0.00743	    0.00979	    0.01212
                     15	    0.00000	    0.00000	    0.00000	    0.00000	    0.00000	    0.00000	    0.00000	    0.00074	    0.00483	    0.00729	    0.00971
                     16	    0.00000	    0.00000	    0.00000	    0.00000	    0.00000	    0.00000	    0.00000	    0.00065	    0.00494	    0.00955	    0.01209
                     17	    0.00000	    0.00000	    0.00000	    0.00000	    0.00000	    0.00000	    0.00000	    0.00300	    0.00717	    0.00976	    0.01236
                     18	    0.00000	    0.00000	    0.00000	    0.00000	    0.00000	    0.00000	    0.00000	    0.00304	    0.00736	    0.01001	    0.01266
                     19	    0.00000	    0.00000	    0.00000	    0.00000	    0.00000	    0.00000	    0.00000	    0.00306	    0.00737	    0.01000	    0.01261
                     20	    0.00000	    0.00000	    0.00000	    0.00000	    0.00000	    0.00000	    0.00000	    0.00314	    0.00753	    0.01019	    0.01284
                     22	    0.00000	    0.00000	    0.00000	    0.00000	    0.00000	    0.00000	    0.00000	    0.00318	    0.00928	    0.01209	    0.01483
                     24	    0.00000	    0.00000	    0.00000	    0.00000	    0.00000	    0.00000	    0.00001	    0.00482	    0.00955	    0.01231	    0.01495
                     25	    0.00000	    0.00000	    0.00000	    0.00000	    0.00000	    0.00000	    0.00000	    0.00239	    0.00680	    0.00944	    0.01199
                     28	    0.00000	    0.00000	    0.00000	    0.00000	    0.00000	    0.00000	    0.00000	    0.00241	    0.00645	    0.00887	    0.01120
                     30	    0.00000	    0.00000	    0.00000	    0.00000	    0.00000	    0.00000	    0.00000	    0.00235	    0.00627	    0.00863	    0.01089
                     35	    0.00000	    0.00000	    0.00000	    0.00000	    0.00000	    0.00000	    0.00038	    0.00225	    0.00743	    0.00945	    0.01132
                     45	    0.00000	    0.00000	    0.00000	    0.00000	    0.00000	    0.00000	    0.00066	    0.00332	    0.00592	    0.00736	    0.00866
                     50	    0.00000	    0.00000	    0.00000	    0.00000	    0.00000	    0.00000	    0.00000	    0.00139	    0.00348	    0.00462	    0.00563
                     55	    0.00000	    0.00000	    0.00000	    0.00000	    0.00000	    0.00000	    0.00000	    0.00030	    0.00204	    0.00298	    0.00380
                     60	    0.00000	    0.00000	    0.00000	    0.00000	    0.00000	    0.00000	    0.00000	    0.00000	    0.00208	    0.00284	    0.00346
            </tableData>
          </table>
       </product>
    </function>
    <function name="aero/c/CFXDED2R">
    <description>DRAG DUE TO ELEVON 2R</description>
    <product>
          <table>
            <independentVar lookup="row">aero/alpha-deg</independentVar>
            <independentVar lookup="column">fcs/elevon-2R-pos-deg</independentVar>
            <tableData>
                                -25	        -20	        -16	        -15	        -10	         -5	          0	          5	         10	         13	         16
                    -10	    0.01497	    0.01197	    0.00943	    0.00878	    0.00559	    0.00262	    0.00000	    0.00000	    0.00000	    0.00000	    0.00000
                     -5	    0.01032	    0.00796	    0.00606	    0.00559	    0.00338	    0.00145	    0.00000	    0.00000	    0.00000	    0.00000	    0.00000
                     -2	    0.00749	    0.00552	    0.00400	    0.00364	    0.00201	    0.00076	    0.00000	    0.00000	    0.00000	    0.00027	    0.00083
                      0	    0.00550	    0.00383	    0.00259	    0.00230	    0.00107	    0.00021	    0.00000	    0.00021	    0.00094	    0.00160	    0.00239
                      1	    0.00424	    0.00283	    0.00180	    0.00157	    0.00061	    0.00004	    0.00000	    0.00042	    0.00139	    0.00219	    0.00313
                      2	    0.00340	    0.00209	    0.00115	    0.00094	    0.00009	    0.00000	    0.00000	    0.00052	    0.00171	    0.00264	    0.00369
                      3	    0.00239	    0.00116	    0.00031	    0.00012	    0.00000	    0.00000	    0.00000	    0.00062	    0.00241	    0.00347	    0.00464
                      4	    0.00115	    0.00003	    0.00000	    0.00000	    0.00000	    0.00000	    0.00000	    0.00065	    0.00292	    0.00409	    0.00537
                      5	    0.00031	    0.00000	    0.00000	    0.00000	    0.00000	    0.00000	    0.00000	    0.00155	    0.00343	    0.00473	    0.00612
                      6	    0.00000	    0.00000	    0.00000	    0.00000	    0.00000	    0.00000	    0.00000	    0.00186	    0.00396	    0.00537	    0.00687
                      7	    0.00000	    0.00000	    0.00000	    0.00000	    0.00000	    0.00000	    0.00000	    0.00217	    0.00452	    0.00607	    0.00769
                      8	    0.00000	    0.00000	    0.00000	    0.00000	    0.00000	    0.00000	    0.00000	    0.00249	    0.00503	    0.00669	    0.00840
                      9	    0.00000	    0.00000	    0.00000	    0.00000	    0.00000	    0.00000	    0.00000	    0.00284	    0.00560	    0.00737	    0.00919
                     10	    0.00000	    0.00000	    0.00000	    0.00000	    0.00000	    0.00000	    0.00000	    0.00323	    0.00622	    0.00813	    0.01008
                     11	    0.00000	    0.00000	    0.00000	    0.00000	    0.00000	    0.00000	    0.00000	    0.00369	    0.00687	    0.00889	    0.01092
                     12	    0.00000	    0.00000	    0.00000	    0.00000	    0.00000	    0.00000	    0.00000	    0.00022	    0.00358	    0.00570	    0.00783
                     13	    0.00000	    0.00000	    0.00000	    0.00000	    0.00000	    0.00000	    0.00000	    0.00340	    0.00716	    0.00946	    0.01173
                     14	    0.00000	    0.00000	    0.00000	    0.00000	    0.00000	    0.00000	    0.00000	    0.00355	    0.00743	    0.00979	    0.01212
                     15	    0.00000	    0.00000	    0.00000	    0.00000	    0.00000	    0.00000	    0.00000	    0.00074	    0.00483	    0.00729	    0.00971
                     16	    0.00000	    0.00000	    0.00000	    0.00000	    0.00000	    0.00000	    0.00000	    0.00065	    0.00494	    0.00955	    0.01209
                     17	    0.00000	    0.00000	    0.00000	    0.00000	    0.00000	    0.00000	    0.00000	    0.00300	    0.00717	    0.00976	    0.01236
                     18	    0.00000	    0.00000	    0.00000	    0.00000	    0.00000	    0.00000	    0.00000	    0.00304	    0.00736	    0.01001	    0.01266
                     19	    0.00000	    0.00000	    0.00000	    0.00000	    0.00000	    0.00000	    0.00000	    0.00306	    0.00737	    0.01000	    0.01261
                     20	    0.00000	    0.00000	    0.00000	    0.00000	    0.00000	    0.00000	    0.00000	    0.00314	    0.00753	    0.01019	    0.01284
                     22	    0.00000	    0.00000	    0.00000	    0.00000	    0.00000	    0.00000	    0.00000	    0.00318	    0.00928	    0.01209	    0.01483
                     24	    0.00000	    0.00000	    0.00000	    0.00000	    0.00000	    0.00000	    0.00001	    0.00482	    0.00955	    0.01231	    0.01495
                     25	    0.00000	    0.00000	    0.00000	    0.00000	    0.00000	    0.00000	    0.00000	    0.00239	    0.00680	    0.00944	    0.01199
                     28	    0.00000	    0.00000	    0.00000	    0.00000	    0.00000	    0.00000	    0.00000	    0.00241	    0.00645	    0.00887	    0.01120
                     30	    0.00000	    0.00000	    0.00000	    0.00000	    0.00000	    0.00000	    0.00000	    0.00235	    0.00627	    0.00863	    0.01089
                     35	    0.00000	    0.00000	    0.00000	    0.00000	    0.00000	    0.00000	    0.00038	    0.00225	    0.00743	    0.00945	    0.01132
                     45	    0.00000	    0.00000	    0.00000	    0.00000	    0.00000	    0.00000	    0.00066	    0.00332	    0.00592	    0.00736	    0.00866
                     50	    0.00000	    0.00000	    0.00000	    0.00000	    0.00000	    0.00000	    0.00000	    0.00139	    0.00348	    0.00462	    0.00563
                     55	    0.00000	    0.00000	    0.00000	    0.00000	    0.00000	    0.00000	    0.00000	    0.00030	    0.00204	    0.00298	    0.00380
                     60	    0.00000	    0.00000	    0.00000	    0.00000	    0.00000	    0.00000	    0.00000	    0.00000	    0.00208	    0.00284	    0.00346
            </tableData>
          </table>
       </product>
    </function>
    <function name="aero/c/CFXDSBL">
    <description>DRAG DUE TO LOWER SPEEDBRAKE DEFLECTION</description>
    <product>
          <table>
            <independentVar lookup="row">aero/alpha-deg</independentVar>
            <independentVar lookup="column">fcs/airbrake-upper</independentVar>
            <tableData>
                                  0	          5	         10	         15	         20	         25	         30	         35	         40	         45	         50	         55
                    -10	    0.00000	    0.00000	    0.00000	    0.00185	    0.00200	    0.00208	    0.00210	    0.00204	    0.00199	    0.00196	    0.00195	    0.00197
                     -5	    0.00014	    0.00100	    0.00151	    0.00210	    0.00269	    0.00321	    0.00364	    0.00390	    0.00410	    0.00421	    0.00424	    0.00418
                     -2	    0.00007	    0.00005	    0.00031	    0.00048	    0.00067	    0.00083	    0.00092	    0.00096	    0.00099	    0.00100	    0.00101	    0.00100
                      0	    0.00008	    0.00011	    0.00020	    0.00036	    0.00057	    0.00080	    0.00105	    0.00120	    0.00131	    0.00138	    0.00140	    0.00136
                      1	    0.00007	    0.00010	    0.00021	    0.00040	    0.00064	    0.00092	    0.00120	    0.00141	    0.00158	    0.00181	    0.00184	    0.00166
                      2	    0.00007	    0.00010	    0.00022	    0.00043	    0.00071	    0.00105	    0.00134	    0.00159	    0.00178	    0.00188	    0.00191	    0.00186
                      3	    0.00007	    0.00023	    0.00023	    0.00044	    0.00072	    0.00107	    0.00137	    0.00164	    0.00184	    0.00194	    0.00197	    0.00192
                      4	    0.00005	    0.00011	    0.00024	    0.00044	    0.00072	    0.00105	    0.00136	    0.00205	    0.00226	    0.00238	    0.00241	    0.00235
                      5	    0.00004	    0.00011	    0.00024	    0.00044	    0.00072	    0.00104	    0.00134	    0.00161	    0.00241	    0.00253	    0.00257	    0.00253
                      6	    0.00002	    0.00011	    0.00026	    0.00049	    0.00078	    0.00112	    0.00143	    0.00169	    0.00189	    0.00280	    0.00283	    0.00197
                      7	    0.00000	    0.00014	    0.00036	    0.00065	    0.00099	    0.00138	    0.00172	    0.00202	    0.00224	    0.00236	    0.00239	    0.00233
                      8	    0.00000	    0.00018	    0.00050	    0.00089	    0.00132	    0.00179	    0.00221	    0.00256	    0.00281	    0.00296	    0.00300	    0.00293
                      9	    0.00000	    0.00025	    0.00070	    0.00122	    0.00177	    0.00234	    0.00284	    0.00326	    0.00357	    0.00375	    0.00380	    0.00371
                     10	    0.00000	    0.00023	    0.00070	    0.00122	    0.00178	    0.00235	    0.00287	    0.00329	    0.00360	    0.00378	    0.00383	    0.00374
                     11	    0.00000	    0.00020	    0.00061	    0.00441	    0.00476	    0.00508	    0.00540	    0.00569	    0.00593	    0.00606	    0.00610	    0.00603
                     12	    0.00000	    0.00000	    0.00058	    0.00109	    0.00144	    0.00175	    0.00204	    0.00229	    0.00250	    0.00262	    0.00265	    0.00259
                     13	    0.00000	    0.00000	    0.00051	    0.00105	    0.00144	    0.00173	    0.00199	    0.00222	    0.00241	    0.00251	    0.00496	    0.00249
                     14	    0.00125	    0.00000	    0.00036	    0.00089	    0.00127	    0.00347	    0.00380	    0.00414	    0.00442	    0.00458	    0.00463	    0.00455
                     15	    0.00000	    0.00000	    0.00000	    0.00048	    0.00039	    0.00025	    0.00045	    0.00071	    0.00093	    0.00107	    0.00110	    0.00104
                     16	    0.00000	    0.00000	    0.00000	    0.00038	    0.00064	    0.00037	    0.00049	    0.00071	    0.00093	    0.00106	    0.00110	    0.00103
                     17	    0.00000	    0.00000	    0.00000	    0.00037	    0.00108	    0.00081	    0.00086	    0.00107	    0.00129	    0.00356	    0.00361	    0.00352
                     18	    0.00049	    0.00079	    0.00000	    0.00025	    0.00135	    0.00118	    0.00114	    0.00346	    0.00376	    0.00395	    0.00400	    0.00391
                     19	    0.00052	    0.00084	    0.00125	    0.00006	    0.00141	    0.00148	    0.00134	    0.00362	    0.00392	    0.00411	    0.00416	    0.00407
                     20	    0.00056	    0.00088	    0.00128	    0.00177	    0.00127	    0.00167	    0.00329	    0.00369	    0.00399	    0.00419	    0.00424	    0.00414
                     22	    0.00067	    0.00096	    0.00134	    0.00179	    0.00236	    0.00176	    0.00330	    0.00363	    0.00391	    0.00409	    0.00414	    0.00405
                     24	    0.00083	    0.00111	    0.00148	    0.00191	    0.00244	    0.00327	    0.00375	    0.00381	    0.00405	    0.00421	    0.00424	    0.00417
                     25	    0.00000	    0.00000	    0.00000	    0.00000	    0.00000	    0.00060	    0.00149	    0.00136	    0.00153	    0.00168	    0.00172	    0.00164
                     28	    0.00000	    0.00000	    0.00000	    0.00000	    0.00000	    0.00000	    0.00054	    0.00128	    0.00113	    0.00110	    0.00111	    0.00110
                     30	    0.00000	    0.00000	    0.00000	    0.00000	    0.00000	    0.00000	    0.00000	    0.00044	    0.00094	    0.00086	    0.00082	    0.00090
                     35	    0.00062	    0.00038	    0.00020	    0.00008	    0.00001	    0.00000	    0.00000	    0.00000	    0.00002	    0.00004	    0.00005	    0.00000
                     45	    0.00086	    0.00063	    0.00044	    0.00030	    0.00019	    0.00013	    0.00010	    0.00010	    0.00010	    0.00011	    0.00000	    0.00000
                     50	    0.00000	    0.00000	    0.00000	    0.00000	    0.00000	    0.00000	    0.00000	    0.00000	    0.00000	    0.00000	    0.00000	    0.00000
                     55	    0.00814	    0.00000	    0.00000	    0.00000	    0.00000	    0.00000	    0.00000	    0.00000	    0.00000	    0.00000	    0.00000	    0.00000
                     60	    0.00000	    0.00000	    0.00000	    0.00000	    0.00000	    0.00000	    0.00000	    0.00000	    0.00000	    0.00000	    0.00000	    0.00000
            </tableData>
          </table>
       </product>
    </function>
    <function name="aero/c/CFXDSBU">
    <description>DRAG DUE TO UPPER SPEEDBRAKE DEFLECTION</description>
    <product>
          <table>
            <independentVar lookup="row">aero/alpha-deg</independentVar>
            <independentVar lookup="column">fcs/airbrake-lower</independentVar>
            <tableData>
                                  0	          5	         11	         17	         22	         28	         34	         39	         45	         50	         56	         62	         67
                    -10	    0.00000	    0.00012	    0.00026	    0.00031	    0.00032	    0.00030	    0.00025	    0.00019	    0.00015	    0.00014	    0.00016	    0.00023	    0.00028
                     -5	    0.00013	    0.00000	    0.00000	    0.00000	    0.00000	    0.00000	    0.00000	    0.00000	    0.00000	    0.00000	    0.00000	    0.00000	    0.00000
                     -2	    0.00007	    0.00006	    0.00023	    0.00039	    0.00057	    0.00080	    0.00101	    0.00114	    0.00123	    0.00125	    0.00120	    0.00108	    0.00088
                      0	    0.00008	    0.00011	    0.00024	    0.00045	    0.00068	    0.00107	    0.00128	    0.00141	    0.00148	    0.00149	    0.00145	    0.00133	    0.00116
                      1	    0.00007	    0.00012	    0.00028	    0.00054	    0.00078	    0.00104	    0.00121	    0.00130	    0.00134	    0.00135	    0.00133	    0.00125	    0.00111
                      2	    0.00007	    0.00010	    0.00016	    0.00046	    0.00071	    0.00096	    0.00111	    0.00117	    0.00121	    0.00122	    0.00120	    0.00114	    0.00104
                      3	    0.00007	    0.00009	    0.00025	    0.00057	    0.00082	    0.00103	    0.00111	    0.00115	    0.00119	    0.00119	    0.00118	    0.00113	    0.00107
                      4	    0.00005	    0.00006	    0.00021	    0.00052	    0.00075	    0.00093	    0.00098	    0.00101	    0.00104	    0.00104	    0.00103	    0.00100	    0.00095
                      5	    0.00004	    0.00004	    0.00019	    0.00047	    0.00068	    0.00082	    0.00086	    0.00087	    0.00089	    0.00089	    0.00088	    0.00086	    0.00084
                      6	    0.00001	    0.00000	    0.00011	    0.00036	    0.00053	    0.00064	    0.00064	    0.00064	    0.00064	    0.00064	    0.00064	    0.00064	    0.00064
                      7	    0.00000	    0.00000	    0.00000	    0.00009	    0.00020	    0.00025	    0.00019	    0.00015	    0.00013	    0.00012	    0.00014	    0.00017	    0.00022
                      8	    0.00000	    0.00000	    0.00000	    0.00000	    0.00000	    0.00000	    0.00000	    0.00000	    0.00000	    0.00000	    0.00000	    0.00000	    0.00000
                      9	    0.00000	    0.00000	    0.00000	    0.00000	    0.00000	    0.00000	    0.00000	    0.00000	    0.00000	    0.00000	    0.00000	    0.00000	    0.00000
                     10	    0.00000	    0.00000	    0.00000	    0.00000	    0.00000	    0.00000	    0.00000	    0.00000	    0.00000	    0.00000	    0.00000	    0.00000	    0.00000
                     11	    0.00000	    0.00000	    0.00000	    0.00000	    0.00000	    0.00162	    0.00151	    0.00142	    0.00137	    0.00135	    0.00138	    0.00147	    0.00158
                     12	    0.00000	    0.00000	    0.00000	    0.00000	    0.00000	    0.00000	    0.00000	    0.00000	    0.00000	    0.00000	    0.00000	    0.00000	    0.00000
                     13	    0.00000	    0.00000	    0.00000	    0.00000	    0.00000	    0.00000	    0.00000	    0.00000	    0.00000	    0.00000	    0.00279	    0.00000	    0.00000
                     14	    0.00127	    0.00115	    0.00119	    0.00139	    0.00157	    0.00171	    0.00179	    0.00180	    0.00179	    0.00179	    0.00179	    0.00180	    0.00175
                     15	    0.00000	    0.00000	    0.00000	    0.00000	    0.00000	    0.00000	    0.00000	    0.00000	    0.00000	    0.00000	    0.00000	    0.00000	    0.00000
                     16	    0.00000	    0.00000	    0.00000	    0.00000	    0.00000	    0.00000	    0.00000	    0.00000	    0.00000	    0.00000	    0.00000	    0.00000	    0.00000
                     17	    0.00000	    0.00000	    0.00000	    0.00000	    0.00000	    0.00000	    0.00000	    0.00000	    0.00000	    0.00000	    0.00000	    0.00000	    0.00000
                     18	    0.00049	    0.00027	    0.00014	    0.00015	    0.00020	    0.00022	    0.00021	    0.00020	    0.00019	    0.00018	    0.00019	    0.00022	    0.00022
                     19	    0.00052	    0.00029	    0.00014	    0.00012	    0.00017	    0.00017	    0.00015	    0.00014	    0.00012	    0.00011	    0.00013	    0.00015	    0.00016
                     20	    0.00057	    0.00035	    0.00021	    0.00020	    0.00025	    0.00026	    0.00024	    0.00024	    0.00022	    0.00021	    0.00022	    0.00024	    0.00025
                     22	    0.00068	    0.00048	    0.00036	    0.00036	    0.00042	    0.00043	    0.00041	    0.00041	    0.00039	    0.00039	    0.00040	    0.00041	    0.00042
                     24	    0.00084	    0.00064	    0.00052	    0.00051	    0.00056	    0.00060	    0.00059	    0.00058	    0.00058	    0.00058	    0.00058	    0.00058	    0.00059
                     25	    0.00000	    0.00000	    0.00000	    0.00000	    0.00000	    0.00000	    0.00000	    0.00000	    0.00000	    0.00000	    0.00000	    0.00000	    0.00000
                     28	    0.00000	    0.00000	    0.00000	    0.00000	    0.00000	    0.00000	    0.00000	    0.00000	    0.00000	    0.00000	    0.00000	    0.00000	    0.00000
                     30	    0.00000	    0.00000	    0.00036	    0.00050	    0.00065	    0.00080	    0.00089	    0.00093	    0.00096	    0.00097	    0.00095	    0.00091	    0.00084
                     35	    0.00058	    0.00087	    0.00126	    0.00165	    0.00208	    0.00226	    0.00246	    0.00258	    0.00264	    0.00265	    0.00262	    0.00251	    0.00235
                     45	    0.00078	    0.00103	    0.00133	    0.00162	    0.00182	    0.00202	    0.00216	    0.00223	    0.00228	    0.00229	    0.00226	    0.00352	    0.00208
                     50	    0.00000	    0.00000	    0.00000	    0.00000	    0.00094	    0.00110	    0.00121	    0.00126	    0.00129	    0.00130	    0.00128	    0.00123	    0.00115
                     55	    0.00000	    0.00000	    0.00017	    0.00037	    0.00049	    0.00060	    0.00065	    0.00068	    0.00069	    0.00069	    0.00069	    0.00066	    0.00062
                     60	    0.00000	    0.00000	    0.00001	    0.00016	    0.00024	    0.00030	    0.00025	    0.00032	    0.00032	    0.00032	    0.00032	    0.00032	    0.00031
            </tableData>
          </table>
       </product>
    </function>
    <function name="aero/c/CFXDSD1L">
    <description>DRAG DUE TO LE SLAT 1L</description>
    <product>
          <table>
            <independentVar lookup="row">aero/alpha-deg</independentVar>
            <independentVar lookup="column">fcs/slat-1L-pos-deg</independentVar>
            <tableData>
                                -17	        -14	        -10	         -7	         -3	          0	          3	          7	         10	         14	         17
                    -10	    0.00000	    0.00000	    0.00000	    0.00000	    0.00000	    0.00000	    0.00000	    0.00000	    0.00000	    0.00000	    0.00000
                     -5	    0.00034	    0.00000	    0.00000	    0.00000	    0.00000	    0.00000	    0.00000	    0.00000	    0.00000	    0.00000	    0.00035
                     -2	    0.00005	    0.00000	    0.00000	    0.00000	    0.00000	    0.00000	    0.00000	    0.00000	    0.00000	    0.00000	    0.00006
                      0	    0.00000	    0.00000	    0.00000	    0.00000	    0.00000	    0.00000	    0.00000	    0.00000	    0.00000	    0.00000	    0.00000
                      1	    0.00000	    0.00000	    0.00000	    0.00000	    0.00000	    0.00000	    0.00000	    0.00000	    0.00000	    0.00000	    0.00000
                      2	    0.00000	    0.00000	    0.00000	    0.00000	    0.00000	    0.00000	    0.00000	    0.00000	    0.00000	    0.00000	    0.00000
                      3	    0.00000	    0.00000	    0.00000	    0.00000	    0.00000	    0.00000	    0.00000	    0.00000	    0.00000	    0.00000	    0.00000
                      4	    0.00000	    0.00000	    0.00000	    0.00000	    0.00000	    0.00000	    0.00000	    0.00000	    0.00000	    0.00000	    0.00000
                      5	    0.00000	    0.00000	    0.00000	    0.00000	    0.00000	    0.00000	    0.00000	    0.00000	    0.00000	    0.00000	    0.00000
                      6	    0.00000	    0.00000	    0.00000	    0.00000	    0.00000	    0.00000	    0.00000	    0.00000	    0.00000	    0.00000	    0.00000
                      7	    0.00000	    0.00000	    0.00000	    0.00000	    0.00000	    0.00000	    0.00000	    0.00000	    0.00000	    0.00000	    0.00000
                      8	    0.00000	    0.00000	    0.00000	    0.00000	    0.00000	    0.00000	    0.00000	    0.00000	    0.00000	    0.00000	    0.00000
                      9	    0.00000	    0.00000	    0.00000	    0.00000	    0.00000	    0.00000	    0.00000	    0.00000	    0.00000	    0.00000	    0.00000
                     10	    0.00000	    0.00000	    0.00000	    0.00000	    0.00000	    0.00000	    0.00000	    0.00000	    0.00000	    0.00000	    0.00000
                     11	    0.00184	    0.00199	    0.00000	    0.00000	    0.00000	    0.00000	    0.00000	    0.00000	    0.00000	    0.00212	    0.00198
                     12	    0.00000	    0.00000	    0.00000	    0.00000	    0.00000	    0.00000	    0.00000	    0.00000	    0.00000	    0.00000	    0.00000
                     13	    0.00000	    0.00000	    0.00000	    0.00000	    0.00000	    0.00000	    0.00000	    0.00000	    0.00000	    0.00000	    0.00000
                     14	    0.00112	    0.00117	    0.00126	    0.00000	    0.00000	    0.00000	    0.00000	    0.00000	    0.00138	    0.00132	    0.00130
                     15	    0.00000	    0.00000	    0.00000	    0.00000	    0.00000	    0.00000	    0.00000	    0.00000	    0.00000	    0.00000	    0.00000
                     16	    0.00000	    0.00000	    0.00000	    0.00000	    0.00000	    0.00000	    0.00000	    0.00000	    0.00000	    0.00000	    0.00000
                     17	    0.00000	    0.00000	    0.00000	    0.00000	    0.00000	    0.00000	    0.00000	    0.00000	    0.00000	    0.00000	    0.00069
                     18	    0.00033	    0.00041	    0.00050	    0.00057	    0.00000	    0.00000	    0.00000	    0.00000	    0.00076	    0.00076	    0.00076
                     19	    0.00038	    0.00046	    0.00056	    0.00063	    0.00000	    0.00000	    0.00000	    0.00082	    0.00083	    0.00084	    0.00085
                     20	    0.00043	    0.00051	    0.00061	    0.00068	    0.00000	    0.00000	    0.00000	    0.00088	    0.00089	    0.00090	    0.00090
                     22	    0.00055	    0.00063	    0.00073	    0.00081	    0.00095	    0.00000	    0.00104	    0.00101	    0.00101	    0.00102	    0.00103
                     24	    0.00070	    0.00079	    0.00090	    0.00099	    0.00117	    0.00000	    0.00127	    0.00120	    0.00121	    0.00122	    0.00123
                     25	    0.00000	    0.00000	    0.00000	    0.00000	    0.00000	    0.00000	    0.00000	    0.00000	    0.00000	    0.00000	    0.00000
                     28	    0.00000	    0.00000	    0.00000	    0.00000	    0.00000	    0.00000	    0.00000	    0.00000	    0.00000	    0.00000	    0.00000
                     30	    0.00000	    0.00000	    0.00000	    0.00000	    0.00000	    0.00000	    0.00000	    0.00000	    0.00000	    0.00000	    0.00000
                     35	    0.00044	    0.00055	    0.00072	    0.00082	    0.00092	    0.00000	    0.00087	    0.00072	    0.00061	    0.00045	    0.00035
                     45	    0.00073	    0.00086	    0.00102	    0.00112	    0.00120	    0.00000	    0.00115	    0.00102	    0.00093	    0.00081	    0.00074
                     50	    0.00000	    0.00000	    0.00000	    0.00000	    0.00000	    0.00000	    0.00000	    0.00000	    0.00000	    0.00000	    0.00000
                     55	    0.00000	    0.00000	    0.00000	    0.00000	    0.00000	    0.00000	    0.00000	    0.00000	    0.00000	    0.00000	    0.00000
                     60	    0.00000	    0.00000	    0.00000	    0.00000	    0.00000	    0.00000	    0.00000	    0.00000	    0.00000	    0.00000	    0.00000
            </tableData>
          </table>
       </product>
    </function>
    <function name="aero/c/CFXDSD1R">
    <description>DRAG DUE TO LE SLAT 1R</description>
    <product>
          <table>
            <independentVar lookup="row">aero/alpha-deg</independentVar>
            <independentVar lookup="column">fcs/slat-1R-pos-deg</independentVar>
            <tableData>
                                -17	        -14	        -10	         -7	         -3	          0	          3	          7	         10	         14	         17
                    -10	    0.00000	    0.00000	    0.00000	    0.00000	    0.00000	    0.00000	    0.00000	    0.00000	    0.00000	    0.00000	    0.00000
                     -5	    0.00034	    0.00000	    0.00000	    0.00000	    0.00000	    0.00000	    0.00000	    0.00000	    0.00000	    0.00000	    0.00035
                     -2	    0.00005	    0.00000	    0.00000	    0.00000	    0.00000	    0.00000	    0.00000	    0.00000	    0.00000	    0.00000	    0.00006
                      0	    0.00000	    0.00000	    0.00000	    0.00000	    0.00000	    0.00000	    0.00000	    0.00000	    0.00000	    0.00000	    0.00000
                      1	    0.00000	    0.00000	    0.00000	    0.00000	    0.00000	    0.00000	    0.00000	    0.00000	    0.00000	    0.00000	    0.00000
                      2	    0.00000	    0.00000	    0.00000	    0.00000	    0.00000	    0.00000	    0.00000	    0.00000	    0.00000	    0.00000	    0.00000
                      3	    0.00000	    0.00000	    0.00000	    0.00000	    0.00000	    0.00000	    0.00000	    0.00000	    0.00000	    0.00000	    0.00000
                      4	    0.00000	    0.00000	    0.00000	    0.00000	    0.00000	    0.00000	    0.00000	    0.00000	    0.00000	    0.00000	    0.00000
                      5	    0.00000	    0.00000	    0.00000	    0.00000	    0.00000	    0.00000	    0.00000	    0.00000	    0.00000	    0.00000	    0.00000
                      6	    0.00000	    0.00000	    0.00000	    0.00000	    0.00000	    0.00000	    0.00000	    0.00000	    0.00000	    0.00000	    0.00000
                      7	    0.00000	    0.00000	    0.00000	    0.00000	    0.00000	    0.00000	    0.00000	    0.00000	    0.00000	    0.00000	    0.00000
                      8	    0.00000	    0.00000	    0.00000	    0.00000	    0.00000	    0.00000	    0.00000	    0.00000	    0.00000	    0.00000	    0.00000
                      9	    0.00000	    0.00000	    0.00000	    0.00000	    0.00000	    0.00000	    0.00000	    0.00000	    0.00000	    0.00000	    0.00000
                     10	    0.00000	    0.00000	    0.00000	    0.00000	    0.00000	    0.00000	    0.00000	    0.00000	    0.00000	    0.00000	    0.00000
                     11	    0.00184	    0.00199	    0.00000	    0.00000	    0.00000	    0.00000	    0.00000	    0.00000	    0.00000	    0.00212	    0.00198
                     12	    0.00000	    0.00000	    0.00000	    0.00000	    0.00000	    0.00000	    0.00000	    0.00000	    0.00000	    0.00000	    0.00000
                     13	    0.00000	    0.00000	    0.00000	    0.00000	    0.00000	    0.00000	    0.00000	    0.00000	    0.00000	    0.00000	    0.00000
                     14	    0.00112	    0.00117	    0.00126	    0.00000	    0.00000	    0.00000	    0.00000	    0.00000	    0.00138	    0.00132	    0.00130
                     15	    0.00000	    0.00000	    0.00000	    0.00000	    0.00000	    0.00000	    0.00000	    0.00000	    0.00000	    0.00000	    0.00000
                     16	    0.00000	    0.00000	    0.00000	    0.00000	    0.00000	    0.00000	    0.00000	    0.00000	    0.00000	    0.00000	    0.00000
                     17	    0.00000	    0.00000	    0.00000	    0.00000	    0.00000	    0.00000	    0.00000	    0.00000	    0.00000	    0.00000	    0.00069
                     18	    0.00033	    0.00041	    0.00050	    0.00057	    0.00000	    0.00000	    0.00000	    0.00000	    0.00076	    0.00076	    0.00076
                     19	    0.00038	    0.00046	    0.00056	    0.00063	    0.00000	    0.00000	    0.00000	    0.00082	    0.00083	    0.00084	    0.00085
                     20	    0.00043	    0.00051	    0.00061	    0.00068	    0.00000	    0.00000	    0.00000	    0.00088	    0.00089	    0.00090	    0.00090
                     22	    0.00055	    0.00063	    0.00073	    0.00081	    0.00095	    0.00000	    0.00104	    0.00101	    0.00101	    0.00102	    0.00103
                     24	    0.00070	    0.00079	    0.00090	    0.00099	    0.00117	    0.00000	    0.00127	    0.00120	    0.00121	    0.00122	    0.00123
                     25	    0.00000	    0.00000	    0.00000	    0.00000	    0.00000	    0.00000	    0.00000	    0.00000	    0.00000	    0.00000	    0.00000
                     28	    0.00000	    0.00000	    0.00000	    0.00000	    0.00000	    0.00000	    0.00000	    0.00000	    0.00000	    0.00000	    0.00000
                     30	    0.00000	    0.00000	    0.00000	    0.00000	    0.00000	    0.00000	    0.00000	    0.00000	    0.00000	    0.00000	    0.00000
                     35	    0.00044	    0.00055	    0.00072	    0.00082	    0.00092	    0.00000	    0.00087	    0.00072	    0.00061	    0.00045	    0.00035
                     45	    0.00073	    0.00086	    0.00102	    0.00112	    0.00120	    0.00000	    0.00115	    0.00102	    0.00093	    0.00081	    0.00074
                     50	    0.00000	    0.00000	    0.00000	    0.00000	    0.00000	    0.00000	    0.00000	    0.00000	    0.00000	    0.00000	    0.00000
                     55	    0.00000	    0.00000	    0.00000	    0.00000	    0.00000	    0.00000	    0.00000	    0.00000	    0.00000	    0.00000	    0.00000
                     60	    0.00000	    0.00000	    0.00000	    0.00000	    0.00000	    0.00000	    0.00000	    0.00000	    0.00000	    0.00000	    0.00000
            </tableData>
          </table>
       </product>
    </function>
    <function name="aero/c/CFXDSD2L">
    <description>DRAG DUE TO LE SLAT 2L</description>
    <product>
          <table>
            <independentVar lookup="row">aero/alpha-deg</independentVar>
            <independentVar lookup="column">fcs/slat-2L-pos-deg</independentVar>
            <tableData>
                                -17	        -14	        -10	         -7	         -3	          0	          3	          7	         10	         14	         17
                    -10	    0.00000	    0.00001	    0.00002	    0.00002	    0.00001	    0.00000	    0.00000	    0.00000	    0.00000	    0.00000	    0.00000
                      3	    0.00000	    0.00000	    0.00000	    0.00000	    0.00000	    0.00000	    0.00000	    0.00000	    0.00000	    0.00000	    0.00000
                      9	    0.00000	    0.00000	    0.00000	    0.00000	    0.00000	    0.00000	    0.00002	    0.00003	    0.00003	    0.00003	    0.00003
                     15	    0.00000	    0.00000	    0.00000	    0.00000	    0.00000	    0.00000	    0.00000	    0.00000	    0.00000	    0.00000	    0.00000
                     22	    0.00092	    0.00093	    0.00095	    0.00098	    0.00000	    0.00000	    0.00000	    0.00099	    0.00095	    0.00092	    0.00091
                     45	    0.00121	    0.00121	    0.00121	    0.00122	    0.00132	    0.00000	    0.00132	    0.00117	    0.00114	    0.00112	    0.00110
                     60	    0.00000	    0.00000	    0.00000	    0.00000	    0.00000	    0.00000	    0.00000	    0.00000	    0.00000	    0.00000	    0.00000
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            </tableData>
          </table>
       </product>
    </function>
    <function name="aero/c/CFXDSD2R">
    <description>DRAG DUE TO LE SLAT 2R</description>
    <product>
          <table>
            <independentVar lookup="row">aero/alpha-deg</independentVar>
            <independentVar lookup="column">fcs/slat-2R-pos-deg</independentVar>
            <tableData>
                                -17	        -14	        -10	         -7	         -3	          0	          3	          7	         10	         14	         17
                    -10	    0.00000	    0.00001	    0.00002	    0.00002	    0.00001	    0.00000	    0.00000	    0.00000	    0.00000	    0.00000	    0.00000
                      3	    0.00000	    0.00000	    0.00000	    0.00000	    0.00000	    0.00000	    0.00000	    0.00000	    0.00000	    0.00000	    0.00000
                      9	    0.00000	    0.00000	    0.00000	    0.00000	    0.00000	    0.00000	    0.00002	    0.00003	    0.00003	    0.00003	    0.00003
                     15	    0.00000	    0.00000	    0.00000	    0.00000	    0.00000	    0.00000	    0.00000	    0.00000	    0.00000	    0.00000	    0.00000
                     22	    0.00092	    0.00093	    0.00095	    0.00098	    0.00000	    0.00000	    0.00000	    0.00099	    0.00095	    0.00092	    0.00091
                     45	    0.00121	    0.00121	    0.00121	    0.00122	    0.00132	    0.00000	    0.00132	    0.00117	    0.00114	    0.00112	    0.00110
                     60	    0.00000	    0.00000	    0.00000	    0.00000	    0.00000	    0.00000	    0.00000	    0.00000	    0.00000	    0.00000	    0.00000
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            </tableData>
          </table>
       </product>
    </function>
    <function name="aero/c/CFXGEAR">
    <description>DRAG INCREMENT DUE TO GEAR</description>
    <product>
          <property>gear/gear-pos-norm</property>
          <table>
            <independentVar lookup="row">aero/alpha-deg</independentVar>
            <tableData>
                    -10		    0.00022
                     -5		    0.00020
                      3		    0.00020
                      8		    0.00022
                     13		    0.00085
                     18		    0.00017
                     25		    0.00102
                     35		    0.00097
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            </tableData>
          </table>
       </product>
    </function>
    <function name="aero/c/CFZB">
    <description>BASIC LIFT</description>
    <product>
          <table>
            <independentVar lookup="row">aero/alpha-deg</independentVar>
            <tableData>
                    -10		  -0.43658
                     -5		  -0.20855
                      4		    0.14160
                     10		    0.40586
                     16		    0.74416
                     24		    1.03405
                     50		    1.07238
                     60		    1.00877
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            </tableData>
          </table>
       </product>
    </function>
    <function name="aero/c/CFZDE2L">
    <description>LIFT DUE TO LE SLAT 2L</description>
    <product>
          <table>
            <independentVar lookup="row">aero/alpha-deg</independentVar>
            <independentVar lookup="column">fcs/slat-2L-pos-deg</independentVar>
            <tableData>
                                -17	        -14	        -10	         -7	         -3	          0	          3	          7	         10	         14	         17
                    -10	  -0.00054	  -0.00057	  -0.00054	  -0.00045	  -0.00024	    0.00000	    0.00032	    0.00087	    0.00135	    0.00207	    0.00265
                      3	  -0.00136	  -0.00102	  -0.00058	  -0.00031	  -0.00006	    0.00000	  -0.00006	  -0.00029	  -0.00055	  -0.00096	  -0.00128
                      9	  -0.00225	  -0.00177	  -0.00117	  -0.00076	  -0.00029	    0.00000	    0.00023	    0.00044	    0.00053	    0.00059	    0.00060
                     15	  -0.01330	  -0.01232	  -0.01031	  -0.00780	  -0.00261	    0.00000	  -0.00183	  -0.00580	  -0.00752	  -0.00861	  -0.00896
                     22	    0.00527	    0.00540	    0.00560	    0.00588	  -0.00157	    0.00000	  -0.00138	    0.00619	    0.00599	    0.00590	    0.00589
                     45	    0.00087	    0.00092	    0.00098	    0.00104	    0.00120	    0.00000	    0.00128	    0.00118	    0.00118	    0.00119	    0.00120
                     60	    0.00340	    0.00339	    0.00335	    0.00327	    0.00268	    0.00000	    0.00253	    0.00321	    0.00332	    0.00338	    0.00340
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            </tableData>
          </table>
       </product>
    </function>
    <function name="aero/c/CFZDE2R">
    <description>LIFT DUE TO LE SLAT 2R</description>
    <product>
          <table>
            <independentVar lookup="row">aero/alpha-deg</independentVar>
            <independentVar lookup="column">fcs/slat-2R-pos-deg</independentVar>
            <tableData>
                                -17	        -14	        -10	         -7	         -3	          0	          3	          7	         10	         14	         17
                    -10	  -0.00054	  -0.00057	  -0.00054	  -0.00045	  -0.00024	    0.00000	    0.00032	    0.00087	    0.00135	    0.00207	    0.00265
                      3	  -0.00136	  -0.00102	  -0.00058	  -0.00031	  -0.00006	    0.00000	  -0.00006	  -0.00029	  -0.00055	  -0.00096	  -0.00128
                      9	  -0.00225	  -0.00177	  -0.00117	  -0.00076	  -0.00029	    0.00000	    0.00023	    0.00044	    0.00053	    0.00059	    0.00060
                     15	  -0.01330	  -0.01232	  -0.01031	  -0.00780	  -0.00261	    0.00000	  -0.00183	  -0.00580	  -0.00752	  -0.00861	  -0.00896
                     22	    0.00527	    0.00540	    0.00560	    0.00588	  -0.00157	    0.00000	  -0.00138	    0.00619	    0.00599	    0.00590	    0.00589
                     45	    0.00087	    0.00092	    0.00098	    0.00104	    0.00120	    0.00000	    0.00128	    0.00118	    0.00118	    0.00119	    0.00120
                     60	    0.00340	    0.00339	    0.00335	    0.00327	    0.00268	    0.00000	    0.00253	    0.00321	    0.00332	    0.00338	    0.00340
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            </tableData>
          </table>
       </product>
    </function>
    <function name="aero/c/CFZDED1L">
    <description>LIFT DUE TO ELEVON 1L</description>
    <product>
          <table>
            <independentVar lookup="row">aero/alpha-deg</independentVar>
            <independentVar lookup="column">fcs/elevon-1L-pos-deg</independentVar>
            <tableData>
                                -25	        -20	        -16	        -15	        -10	         -5	          0	          5	         10	         13	         16
                    -10	  -0.08024	  -0.07164	  -0.06272	  -0.06041	  -0.02995	  -0.01643	    0.00000	    0.01852	    0.03854	    0.05080	    0.06288
                      3	  -0.08318	  -0.07348	  -0.05580	  -0.05282	  -0.03628	  -0.01783	    0.00000	    0.01529	    0.02952	    0.03792	    0.04614
                      9	  -0.09473	  -0.07780	  -0.06271	  -0.05878	  -0.03863	  -0.01864	    0.00000	    0.01672	    0.03162	    0.03984	    0.04741
                     15	  -0.09495	  -0.08011	  -0.06702	  -0.06361	  -0.04585	  -0.02760	    0.00000	    0.00297	    0.01524	    0.02144	    0.02726
                     22	  -0.05023	  -0.03936	  -0.03032	  -0.02801	  -0.01651	  -0.00502	    0.00000	    0.01390	    0.02156	    0.02570	    0.02946
                     45	  -0.01867	  -0.01461	  -0.01125	  -0.01041	  -0.00629	  -0.00243	    0.00000	    0.00396	    0.00634	    0.00750	    0.00847
                     60	  -0.01064	  -0.00846	  -0.00292	  -0.00247	  -0.00023	    0.00183	    0.00000	    0.00505	    0.00611	    0.00654	    0.00683
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            </tableData>
          </table>
       </product>
    </function>
    <function name="aero/c/CFZDED1R">
    <description>LIFT DUE TO ELEVON 1R</description>
    <product>
          <table>
            <independentVar lookup="row">aero/alpha-deg</independentVar>
            <independentVar lookup="column">fcs/elevon-1R-pos-deg</independentVar>
            <tableData>
                                -25	        -20	        -16	        -15	        -10	         -5	          0	          5	         10	         13	         16
                    -10	  -0.08024	  -0.07164	  -0.06272	  -0.06041	  -0.02995	  -0.01643	    0.00000	    0.01852	    0.03854	    0.05080	    0.06288
                      3	  -0.08318	  -0.07348	  -0.05580	  -0.05282	  -0.03628	  -0.01783	    0.00000	    0.01529	    0.02952	    0.03792	    0.04614
                      9	  -0.09473	  -0.07780	  -0.06271	  -0.05878	  -0.03863	  -0.01864	    0.00000	    0.01672	    0.03162	    0.03984	    0.04741
                     15	  -0.09495	  -0.08011	  -0.06702	  -0.06361	  -0.04585	  -0.02760	    0.00000	    0.00297	    0.01524	    0.02144	    0.02726
                     22	  -0.05023	  -0.03936	  -0.03032	  -0.02801	  -0.01651	  -0.00502	    0.00000	    0.01390	    0.02156	    0.02570	    0.02946
                     45	  -0.01867	  -0.01461	  -0.01125	  -0.01041	  -0.00629	  -0.00243	    0.00000	    0.00396	    0.00634	    0.00750	    0.00847
                     60	  -0.01064	  -0.00846	  -0.00292	  -0.00247	  -0.00023	    0.00183	    0.00000	    0.00505	    0.00611	    0.00654	    0.00683
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            </tableData>
          </table>
       </product>
    </function>
    <function name="aero/c/CFZDEL">
    <description>LIFT DUE TO LOWER SPEEDBRAKE DEFLECTION</description>
    <product>
          <table>
            <independentVar lookup="row">aero/alpha-deg</independentVar>
            <independentVar lookup="column">fcs/airbrake-upper</independentVar>
            <tableData>
                                  0	          5	         10	         15	         20	         25	         30	         35	         40	         45	         50	         55
                    -10	    0.00099	    0.00299	    0.00547	  -0.01456	  -0.01391	  -0.01293	  -0.01182	  -0.01053	  -0.00954	  -0.00895	  -0.00879	  -0.00908
                      3	  -0.00037	    0.00045	  -0.00096	  -0.00219	  -0.00316	  -0.00376	  -0.00381	  -0.00368	  -0.00346	  -0.00325	  -0.00319	  -0.00330
                      9	  -0.00097	    0.00015	    0.00103	    0.00163	    0.00201	    0.00222	    0.00252	    0.00284	    0.00311	    0.00334	    0.00340	    0.00328
                     15	  -0.01248	  -0.01101	  -0.00716	  -0.00052	  -0.00383	  -0.00814	  -0.00962	  -0.00992	  -0.00992	  -0.00976	  -0.00971	  -0.00980
                     22	    0.00496	    0.00525	    0.00560	    0.00603	    0.00697	    0.00011	    0.00734	    0.00709	    0.00725	    0.00738	    0.00742	    0.00735
                     45	    0.00173	    0.00092	    0.00011	  -0.00069	  -0.00150	  -0.00226	  -0.00296	  -0.00354	  -0.00399	  -0.00426	  -0.01423	  -0.00460
                     60	    0.00286	    0.00211	    0.00130	    0.00047	  -0.00038	  -0.00120	  -0.00197	  -0.00262	  -0.00313	  -0.00344	  -0.00352	  -0.00336
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            </tableData>
          </table>
       </product>
    </function>
    <function name="aero/c/CFZDSBU">
    <description>LIFT DUE TO UPPER SPEEDBRAKE DEFLECTION</description>
    <product>
          <table>
            <independentVar lookup="row">aero/alpha-deg</independentVar>
            <independentVar lookup="column">fcs/airbrake-lower</independentVar>
            <tableData>
                                  0	          5	         11	         17	         22	         28	         34	         39	         45	         50	         56	         62	         67
                    -10	    0.00115	    0.00009	    0.00059	    0.00279	    0.00543	    0.00872	    0.01156	    0.01332	    0.01456	    0.01483	    0.01414	    0.01235	    0.00988
                      3	  -0.00038	  -0.00179	  -0.00333	  -0.00396	  -0.00436	  -0.00486	  -0.00572	  -0.00614	  -0.00641	  -0.00646	  -0.00632	  -0.00591	  -0.00524
                      9	  -0.00097	  -0.00212	  -0.00337	  -0.00449	  -0.00574	  -0.00739	  -0.00918	  -0.01027	  -0.01102	  -0.01118	  -0.01077	  -0.00966	  -0.00813
                     15	  -0.01253	  -0.01313	  -0.01319	  -0.01284	  -0.01260	  -0.01266	  -0.01286	  -0.01312	  -0.01338	  -0.01344	  -0.01330	  -0.01294	  -0.01270
                     22	    0.00497	    0.00484	    0.00488	    0.00510	    0.00534	    0.00522	    0.00495	    0.00480	    0.00465	    0.00461	    0.00471	    0.00488	    0.00510
                     45	    0.00159	    0.00239	    0.00330	    0.00408	    0.00461	    0.00510	    0.00544	    0.00562	    0.00573	    0.00575	    0.00569	    0.00746	    0.00525
                     60	    0.00268	    0.00334	    0.00399	    0.00445	    0.00471	    0.00488	    0.00491	    0.00496	    0.00495	    0.00494	    0.00495	    0.00495	    0.00492
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            </tableData>
          </table>
       </product>
    </function>
    <function name="aero/c/CFZDSD1L">
    <description>LIFT DUE TO LE SLAT 1L</description>
    <product>
          <table>
            <independentVar lookup="row">aero/alpha-deg</independentVar>
            <independentVar lookup="column">fcs/slat-1L-pos-deg</independentVar>
            <tableData>
                                -17	        -14	        -10	         -7	         -3	          0	          3	          7	         10	         14	         17
                    -10	    0.00426	    0.00318	    0.00181	    0.00095	    0.00019	    0.00000	    0.00020	    0.00105	    0.00205	    0.00369	    0.00504
                      3	  -0.00331	  -0.00269	  -0.00172	  -0.00094	  -0.00013	    0.00000	  -0.00044	  -0.00165	  -0.00270	  -0.00402	  -0.00486
                      9	  -0.00407	  -0.00297	  -0.00164	  -0.00083	  -0.00015	    0.00000	  -0.00016	  -0.00081	  -0.00154	  -0.00269	  -0.00361
                     15	  -0.01397	  -0.01349	  -0.01261	  -0.01139	  -0.00661	    0.00000	  -0.00592	  -0.01009	  -0.01090	  -0.01126	  -0.01134
                     22	    0.00256	    0.00317	    0.00398	    0.00458	    0.00568	    0.00000	    0.00654	    0.00651	    0.00671	    0.00696	    0.00712
                     45	    0.00092	    0.00099	    0.00109	    0.00113	    0.00116	    0.00000	    0.00105	    0.00088	    0.00077	    0.00064	    0.00055
                     60	    0.00108	    0.00082	    0.00397	    0.00370	    0.00333	    0.00000	    0.00318	    0.00338	    0.00344	    0.00349	    0.00352
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            </tableData>
          </table>
       </product>
    </function>
    <function name="aero/c/CFZDSD1R">
    <description>LIFT DUE TO LE SLAT 1R</description>
    <product>
          <table>
            <independentVar lookup="row">aero/alpha-deg</independentVar>
            <independentVar lookup="column">fcs/slat-1R-pos-deg</independentVar>
            <tableData>
                                -17	        -14	        -10	         -7	         -3	          0	          3	          7	         10	         14	         17
                    -10	    0.00426	    0.00318	    0.00181	    0.00095	    0.00019	    0.00000	    0.00020	    0.00105	    0.00205	    0.00369	    0.00504
                      3	  -0.00331	  -0.00269	  -0.00172	  -0.00094	  -0.00013	    0.00000	  -0.00044	  -0.00165	  -0.00270	  -0.00402	  -0.00486
                      9	  -0.00407	  -0.00297	  -0.00164	  -0.00083	  -0.00015	    0.00000	  -0.00016	  -0.00081	  -0.00154	  -0.00269	  -0.00361
                     15	  -0.01397	  -0.01349	  -0.01261	  -0.01139	  -0.00661	    0.00000	  -0.00592	  -0.01009	  -0.01090	  -0.01126	  -0.01134
                     22	    0.00256	    0.00317	    0.00398	    0.00458	    0.00568	    0.00000	    0.00654	    0.00651	    0.00671	    0.00696	    0.00712
                     45	    0.00092	    0.00099	    0.00109	    0.00113	    0.00116	    0.00000	    0.00105	    0.00088	    0.00077	    0.00064	    0.00055
                     60	    0.00108	    0.00082	    0.00397	    0.00370	    0.00333	    0.00000	    0.00318	    0.00338	    0.00344	    0.00349	    0.00352
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            </tableData>
          </table>
       </product>
    </function>
    <function name="aero/c/CFZGEAR">
    <description>LIFT INCREMENT DUE TO GEAR</description>
    <product>
          <property>gear/gear-pos-norm</property>
          <table>
            <independentVar lookup="row">aero/alpha-deg</independentVar>
            <tableData>
                    -10		    0.00039
                     -5		    0.00032
                      3		  -0.00016
                      8		  -0.00080
                     13		    0.00289
                     18		  -0.00394
                     25		    0.00085
                     35		    0.00376
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            </tableData>
          </table>
       </product>
    </function>
    <function name="aero/c/CMM1">
    <description>BASIC PITCHING MOMENT</description>
    <product>
          <table>
            <independentVar lookup="row">aero/alpha-deg</independentVar>
            <tableData>
                    -20		    0.06938
                    -10		    0.03469
                      3		    0.00111
                      9		  -0.01023
                     15		  -0.04979
                     22		  -0.02896
                     45		    0.04613
                     60		    0.03127
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            </tableData>
          </table>
       </product>
    </function>
    <function name="aero/c/CMMALPHADOT">
    <description>PITCH MOMENT DERIVATIVE FOR ALPHA DOT</description>
    <product>
          <property>aero/alphadot-rad_sec-limited</property>
          <table>
            <independentVar lookup="row">aero/alpha-deg</independentVar>
            <tableData>
                    -10		  -0.29716
                     -5		  -0.18894
                      4		  -0.09187
                     10		  -0.17693
                     16		    0.09043
                     24		    0.19856
                     50		  -0.02760
                     60		  -0.08090
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            </tableData>
          </table>
       </product>
    </function>
    <function name="aero/c/CMMBETADOT">
    <description>PITCH MOMENT DERIVATIVE FOR BETA DOT</description>
    <product>
          <property>aero/betadot-rad_sec-limited</property>
          <table>
            <independentVar lookup="row">aero/alpha-deg</independentVar>
            <tableData>
                    -10		    0.15094
                     -5		  -0.04442
                      4		    0.00364
                     10		  -0.20293
                     16		    0.10071
                     24		  -0.11703
                     50		    0.18237
                     60		    0.19736
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            </tableData>
          </table>
       </product>
    </function>
    <function name="aero/c/CMMDED1L">
    <description>PITCH MOMENT DUE TO ELEVON 1L</description>
    <product>
          <table>
            <independentVar lookup="row">aero/alpha-deg</independentVar>
            <independentVar lookup="column">fcs/elevon-1L-pos-deg</independentVar>
            <tableData>
                                -25	        -20	        -16	        -15	        -10	         -5	          0	          5	         10	         13	         16
                    -10	    0.04360	    0.03888	    0.03392	    0.03262	    0.01637	    0.00904	    0.00000	  -0.01019	  -0.02115	  -0.02783	  -0.03438
                      3	    0.04157	    0.03681	    0.02811	    0.02665	    0.01847	    0.00915	    0.00000	  -0.00788	  -0.01532	  -0.01982	  -0.02428
                      9	    0.04830	    0.03990	    0.03229	    0.03030	    0.01998	    0.00965	    0.00000	  -0.00864	  -0.01634	  -0.02061	  -0.02453
                     15	    0.04520	    0.03809	    0.03176	    0.03009	    0.02139	    0.01246	    0.00000	  -0.00281	  -0.00920	  -0.01245	  -0.01549
                     22	    0.02569	    0.02059	    0.01629	    0.01519	    0.00964	    0.00406	    0.00000	  -0.00595	  -0.01021	  -0.01251	  -0.01460
                     45	    0.00928	    0.00703	    0.00514	    0.00467	    0.00232	    0.00011	    0.00000	  -0.00359	  -0.00497	  -0.00565	  -0.00622
                     60	    0.00662	    0.00504	    0.00818	    0.00789	    0.00647	    0.00519	    0.00000	    0.00329	    0.00271	    0.00248	    0.00231
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            </tableData>
          </table>
       </product>
    </function>
    <function name="aero/c/CMMDED1R">
    <description>PITCH MOMENT DUE TO ELEVON 1R</description>
    <product>
          <table>
            <independentVar lookup="row">aero/alpha-deg</independentVar>
            <independentVar lookup="column">fcs/elevon-1R-pos-deg</independentVar>
            <tableData>
                                -25	        -20	        -16	        -15	        -10	         -5	          0	          5	         10	         13	         16
                    -10	    0.04360	    0.03888	    0.03392	    0.03262	    0.01637	    0.00904	    0.00000	  -0.01019	  -0.02115	  -0.02783	  -0.03438
                      3	    0.04157	    0.03681	    0.02811	    0.02665	    0.01847	    0.00915	    0.00000	  -0.00788	  -0.01532	  -0.01982	  -0.02428
                      9	    0.04830	    0.03990	    0.03229	    0.03030	    0.01998	    0.00965	    0.00000	  -0.00864	  -0.01634	  -0.02061	  -0.02453
                     15	    0.04520	    0.03809	    0.03176	    0.03009	    0.02139	    0.01246	    0.00000	  -0.00281	  -0.00920	  -0.01245	  -0.01549
                     22	    0.02569	    0.02059	    0.01629	    0.01519	    0.00964	    0.00406	    0.00000	  -0.00595	  -0.01021	  -0.01251	  -0.01460
                     45	    0.00928	    0.00703	    0.00514	    0.00467	    0.00232	    0.00011	    0.00000	  -0.00359	  -0.00497	  -0.00565	  -0.00622
                     60	    0.00662	    0.00504	    0.00818	    0.00789	    0.00647	    0.00519	    0.00000	    0.00329	    0.00271	    0.00248	    0.00231
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            </tableData>
          </table>
       </product>
    </function>
    <function name="aero/c/CMMDED2L">
    <description>PITCH MOMENT DUE TO ELEVON 2L</description>
    <product>
          <table>
            <independentVar lookup="row">aero/alpha-deg</independentVar>
            <independentVar lookup="column">fcs/elevon-2L-pos-deg</independentVar>
            <tableData>
                                -25	        -20	        -16	        -15	        -10	         -5	          0	          5	         10	         13	         16
                    -10	    0.04834	    0.04032	    0.03301	    0.03107	    0.02083	    0.01011	  -0.01006	  -0.01374	  -0.02617	  -0.03320	  -0.03994
                      3	    0.04563	    0.04041	    0.03528	    0.03385	    0.02569	    0.01571	    0.00208	  -0.00340	  -0.01992	  -0.02579	  -0.03150
                      9	    0.04792	    0.03992	    0.03270	    0.03079	    0.02077	    0.01008	    0.00618	  -0.01143	  -0.02172	  -0.02768	  -0.03338
                     15	    0.06348	    0.05437	    0.04614	    0.04399	    0.03312	    0.02173	    0.01425	  -0.00078	  -0.01129	  -0.01723	  -0.02286
                     22	    0.04243	    0.03527	    0.02885	    0.02716	    0.02148	    0.01109	  -0.00099	  -0.00837	  -0.01912	  -0.02425	  -0.02913
                     45	    0.01882	    0.01434	    0.01049	    0.00949	    0.00443	  -0.00081	  -0.00640	  -0.01024	  -0.01406	  -0.01617	  -0.01807
                     60	    0.00848	    0.00572	    0.00338	    0.00278	  -0.00017	  -0.00303	  -0.00159	  -0.00346	  -0.00961	  -0.01049	  -0.01121
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            </tableData>
          </table>
       </product>
    </function>
    <function name="aero/c/CMMDED2R">
    <description>PITCH MOMENT DUE TO ELEVON 2R</description>
    <product>
          <table>
            <independentVar lookup="row">aero/alpha-deg</independentVar>
            <independentVar lookup="column">fcs/elevon-2R-pos-deg</independentVar>
            <tableData>
                                -25	        -20	        -16	        -15	        -10	         -5	          0	          5	         10	         13	         16
                    -10	    0.04834	    0.04032	    0.03301	    0.03107	    0.02083	    0.01011	  -0.01006	  -0.01374	  -0.02617	  -0.03320	  -0.03994
                      3	    0.04563	    0.04041	    0.03528	    0.03385	    0.02569	    0.01571	    0.00208	  -0.00340	  -0.01992	  -0.02579	  -0.03150
                      9	    0.04792	    0.03992	    0.03270	    0.03079	    0.02077	    0.01008	    0.00618	  -0.01143	  -0.02172	  -0.02768	  -0.03338
                     15	    0.06348	    0.05437	    0.04614	    0.04399	    0.03312	    0.02173	    0.01425	  -0.00078	  -0.01129	  -0.01723	  -0.02286
                     22	    0.04243	    0.03527	    0.02885	    0.02716	    0.02148	    0.01109	  -0.00099	  -0.00837	  -0.01912	  -0.02425	  -0.02913
                     45	    0.01882	    0.01434	    0.01049	    0.00949	    0.00443	  -0.00081	  -0.00640	  -0.01024	  -0.01406	  -0.01617	  -0.01807
                     60	    0.00848	    0.00572	    0.00338	    0.00278	  -0.00017	  -0.00303	  -0.00159	  -0.00346	  -0.00961	  -0.01049	  -0.01121
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            </tableData>
          </table>
       </product>
    </function>
    <function name="aero/c/CMMDSBL">
    <description>PITCH MOMENT DUE TO LOWER SPEEDBRAKE DEFLECTION</description>
    <product>
          <table>
            <independentVar lookup="row">aero/alpha-deg</independentVar>
            <independentVar lookup="column">fcs/airbrake-upper</independentVar>
            <tableData>
                                  0	          5	         10	         15	         20	         25	         30	         35	         40	         45	         50	         55
                    -10	  -0.00050	  -0.00173	  -0.00321	    0.00740	    0.00713	    0.00692	    0.00674	    0.00659	    0.00649	    0.00642	    0.00641	    0.00644
                      3	    0.00017	    0.00024	    0.00050	    0.00123	    0.00181	    0.00220	    0.00242	    0.00254	    0.00259	    0.00261	    0.00261	    0.00260
                      9	    0.00020	    0.00001	    0.00001	    0.00019	    0.00049	    0.00085	    0.00122	    0.00154	    0.00179	    0.00194	    0.00198	    0.00191
                     15	    0.00489	    0.00414	    0.00249	  -0.00025	    0.00091	    0.00248	    0.00302	    0.00317	    0.00320	    0.00319	    0.00319	    0.00320
                     22	  -0.00102	  -0.00115	  -0.00128	  -0.00142	  -0.00165	  -0.00011	  -0.00181	  -0.00178	  -0.00180	  -0.00183	  -0.00183	  -0.00182
                     45	  -0.00057	  -0.00075	  -0.00096	  -0.00117	  -0.00137	  -0.00156	  -0.00172	  -0.00185	  -0.00194	  -0.00199	    0.00183	  -0.00177
                     60	    0.00142	    0.00135	    0.00127	    0.00118	    0.00107	    0.00095	    0.00082	    0.00070	    0.00061	    0.00054	    0.00053	    0.00056
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            </tableData>
          </table>
       </product>
    </function>
    <function name="aero/c/CMMDSBU">
    <description>PITCH MOMENT DUE TO UPPER SPEEDBRAKE DEFLECTION</description>
    <product>
          <table>
            <independentVar lookup="row">aero/alpha-deg</independentVar>
            <independentVar lookup="column">fcs/airbrake-lower</independentVar>
            <tableData>
                                  0	          5	         11	         17	         22	         28	         34	         39	         45	         50	         56	         62	         67
                    -10	  -0.00055	    0.00026	    0.00043	  -0.00020	  -0.00112	  -0.00237	  -0.00353	  -0.00427	  -0.00481	  -0.00492	  -0.00463	  -0.00385	  -0.00285
                      3	    0.00017	    0.00114	    0.00243	    0.00336	    0.00388	    0.00427	    0.00451	    0.00462	    0.00468	    0.00469	    0.00466	    0.00456	    0.00438
                      9	    0.00021	    0.00060	    0.00122	    0.00190	    0.00247	    0.00309	    0.00361	    0.00392	    0.00413	    0.00418	    0.00406	    0.00374	    0.00331
                     15	    0.00488	    0.00532	    0.00567	    0.00593	    0.00609	    0.00626	    0.00639	    0.00647	    0.00653	    0.00654	    0.00651	    0.00642	    0.00632
                     22	  -0.00102	  -0.00090	  -0.00078	  -0.00068	  -0.00061	  -0.00052	  -0.00044	  -0.00039	  -0.00036	  -0.00036	  -0.00037	  -0.00042	  -0.00048
                     45	  -0.00056	  -0.00040	  -0.00024	  -0.00012	  -0.00005	    0.00002	    0.00006	    0.00008	    0.00009	    0.00009	    0.00009	  -0.00099	    0.00004
                     60	    0.00142	    0.00147	    0.00152	    0.00155	    0.00156	    0.00157	    0.00158	    0.00158	    0.00158	    0.00158	    0.00158	    0.00158	    0.00157
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            </tableData>
          </table>
       </product>
    </function>
    <function name="aero/c/CMMDSD1L">
    <description>PITCH MOMENT DUE TO LE SLAT 1L</description>
    <product>
          <table>
            <independentVar lookup="row">aero/alpha-deg</independentVar>
            <independentVar lookup="column">fcs/slat-1L-pos-deg</independentVar>
            <tableData>
                                -17	        -14	        -10	         -7	         -3	          0	          3	          7	         10	         14	         17
                    -10	  -0.00454	  -0.00356	  -0.00228	  -0.00140	  -0.00047	    0.00000	    0.00022	    0.00017	  -0.00011	  -0.00070	  -0.00123
                      3	    0.00101	    0.00079	    0.00042	    0.00013	  -0.00012	    0.00000	    0.00046	    0.00146	    0.00231	    0.00338	    0.00410
                      9	    0.00086	    0.00043	  -0.00004	  -0.00024	  -0.00024	    0.00000	    0.00045	    0.00133	    0.00213	    0.00332	    0.00423
                     15	    0.00285	    0.00308	    0.00332	    0.00332	    0.00210	    0.00000	    0.00281	    0.00507	    0.00584	    0.00656	    0.00699
                     22	  -0.00353	  -0.00317	  -0.00267	  -0.00228	  -0.00180	    0.00000	  -0.00096	  -0.00032	    0.00009	    0.00060	    0.00095
                     45	  -0.00231	  -0.00233	  -0.00235	  -0.00232	  -0.00223	    0.00000	  -0.00184	  -0.00144	  -0.00117	  -0.00085	  -0.00065
                     60	    0.00025	    0.00012	    0.00391	    0.00383	    0.00367	    0.00000	    0.00378	    0.00414	    0.00426	    0.00438	    0.00444
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            </tableData>
          </table>
       </product>
    </function>
    <function name="aero/c/CMMDSD1R">
    <description>PITCH MOMENT DUE TO LE SLAT 1R</description>
    <product>
          <table>
            <independentVar lookup="row">aero/alpha-deg</independentVar>
            <independentVar lookup="column">fcs/slat-1R-pos-deg</independentVar>
            <tableData>
                                -17	        -14	        -10	         -7	         -3	          0	          3	          7	         10	         14	         17
                    -10	  -0.00454	  -0.00356	  -0.00228	  -0.00140	  -0.00047	    0.00000	    0.00022	    0.00017	  -0.00011	  -0.00070	  -0.00123
                      3	    0.00101	    0.00079	    0.00042	    0.00013	  -0.00012	    0.00000	    0.00046	    0.00146	    0.00231	    0.00338	    0.00410
                      9	    0.00086	    0.00043	  -0.00004	  -0.00024	  -0.00024	    0.00000	    0.00045	    0.00133	    0.00213	    0.00332	    0.00423
                     15	    0.00285	    0.00308	    0.00332	    0.00332	    0.00210	    0.00000	    0.00281	    0.00507	    0.00584	    0.00656	    0.00699
                     22	  -0.00353	  -0.00317	  -0.00267	  -0.00228	  -0.00180	    0.00000	  -0.00096	  -0.00032	    0.00009	    0.00060	    0.00095
                     45	  -0.00231	  -0.00233	  -0.00235	  -0.00232	  -0.00223	    0.00000	  -0.00184	  -0.00144	  -0.00117	  -0.00085	  -0.00065
                     60	    0.00025	    0.00012	    0.00391	    0.00383	    0.00367	    0.00000	    0.00378	    0.00414	    0.00426	    0.00438	    0.00444
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            </tableData>
          </table>
       </product>
    </function>
    <function name="aero/c/CMMDSD2L">
    <description>PITCH MOMENT DUE TO LE SLAT 2L</description>
    <product>
          <table>
            <independentVar lookup="row">aero/alpha-deg</independentVar>
            <independentVar lookup="column">fcs/slat-2L-pos-deg</independentVar>
            <tableData>
                                -17	        -14	        -10	         -7	         -3	          0	          3	          7	         10	         14	         17
                    -10	  -0.00104	  -0.00080	  -0.00051	  -0.00031	  -0.00011	    0.00000	    0.00005	    0.00005	    0.00000	  -0.00014	  -0.00028
                      3	    0.00002	  -0.00007	  -0.00015	  -0.00017	  -0.00012	    0.00000	    0.00019	    0.00054	    0.00086	    0.00131	    0.00165
                      9	    0.00011	    0.00001	  -0.00008	  -0.00010	  -0.00007	    0.00000	    0.00012	    0.00032	    0.00051	    0.00079	    0.00102
                     15	    0.00384	    0.00368	    0.00321	    0.00247	    0.00077	    0.00000	    0.00097	    0.00285	    0.00374	    0.00445	    0.00478
                     22	  -0.00256	  -0.00235	  -0.00208	  -0.00189	    0.00020	    0.00000	    0.00061	  -0.00087	  -0.00064	  -0.00037	  -0.00020
                     45	  -0.00252	  -0.00244	  -0.00233	  -0.00226	  -0.00235	    0.00000	  -0.00221	  -0.00188	  -0.00177	  -0.00168	  -0.00162
                     60	    0.00367	    0.00370	    0.00372	    0.00368	    0.00306	    0.00000	    0.00296	    0.00374	    0.00389	    0.00397	    0.00401
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            </tableData>
          </table>
       </product>
    </function>
    <function name="aero/c/CMMDSD2R">
    <description>PITCH MOMENT DUE TO LE SLAT 2R</description>
    <product>
          <table>
            <independentVar lookup="row">aero/alpha-deg</independentVar>
            <independentVar lookup="column">fcs/slat-2R-pos-deg</independentVar>
            <tableData>
                                -17	        -14	        -10	         -7	         -3	          0	          3	          7	         10	         14	         17
                    -10	  -0.00104	  -0.00080	  -0.00051	  -0.00031	  -0.00011	    0.00000	    0.00005	    0.00005	    0.00000	  -0.00014	  -0.00028
                      3	    0.00002	  -0.00007	  -0.00015	  -0.00017	  -0.00012	    0.00000	    0.00019	    0.00054	    0.00086	    0.00131	    0.00165
                      9	    0.00011	    0.00001	  -0.00008	  -0.00010	  -0.00007	    0.00000	    0.00012	    0.00032	    0.00051	    0.00079	    0.00102
                     15	    0.00384	    0.00368	    0.00321	    0.00247	    0.00077	    0.00000	    0.00097	    0.00285	    0.00374	    0.00445	    0.00478
                     22	  -0.00256	  -0.00235	  -0.00208	  -0.00189	    0.00020	    0.00000	    0.00061	  -0.00087	  -0.00064	  -0.00037	  -0.00020
                     45	  -0.00252	  -0.00244	  -0.00233	  -0.00226	  -0.00235	    0.00000	  -0.00221	  -0.00188	  -0.00177	  -0.00168	  -0.00162
                     60	    0.00367	    0.00370	    0.00372	    0.00368	    0.00306	    0.00000	    0.00296	    0.00374	    0.00389	    0.00397	    0.00401
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            </tableData>
          </table>
       </product>
    </function>
    <function name="aero/c/CMMGEAR">
    <description>PITCHING MOMENT INCREMENT DUE TO GEAR</description>
    <product>
          <property>gear/gear-pos-norm</property>
          <table>
            <independentVar lookup="row">aero/alpha-deg</independentVar>
            <tableData>
                    -10		  -0.00087
                     -5		  -0.00043
                      3		    0.00022
                      8		    0.00085
                     13		  -0.00074
                     18		    0.00197
                     25		    0.00172
                     35		    0.00291
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            </tableData>
          </table>
       </product>
    </function>
    <function name="aero/c/CMMQ">
    <description>PITCH DAMPING DERIVATIVE</description>
    <product>
          <property>aero/qb</property>
          <table>
            <independentVar lookup="row">aero/alpha-deg</independentVar>
            <tableData>
                    -10		  -1.60406
                     -5		  -1.41176
                      4		  -1.34396
                     10		  -1.50235
                     16		  -1.11134
                     24		  -0.87892
                     50		  -0.43958
                     60		  -0.32111
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            </tableData>
          </table>
       </product>
    </function>
    <function name="aero/c/CML1">
    <description>BASIC ROLLING MOMENT</description>
    <product>
          <table>
            <independentVar lookup="row">aero/alpha-deg</independentVar>
            <independentVar lookup="column">aero/beta-deg</independentVar>
            <tableData>
                                -10	         -5	         -2	          0	          2	          5	         10
                    -10	  -0.01850	  -0.01015	  -0.00420	    0.00000	    0.00420	    0.01015	    0.01850
                      3	    0.00798	    0.00367	    0.00133	    0.00000	  -0.00133	  -0.00367	  -0.00798
                      9	    0.01756	    0.00860	    0.00338	    0.00000	  -0.00338	  -0.00860	  -0.01756
                     15	    0.02447	    0.01172	    0.00466	    0.00000	  -0.00466	  -0.01172	  -0.02447
                     22	    0.02322	    0.01163	    0.00437	    0.00000	  -0.00437	  -0.01163	  -0.02322
                     45	    0.01784	    0.00863	    0.00347	    0.00000	  -0.00347	  -0.00863	  -0.01784
                     60	    0.01694	    0.00856	    0.00340	    0.00000	  -0.00340	  -0.00856	  -0.01694
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            </tableData>
          </table>
       </product>
    </function>
    <function name="aero/c/CMLBETADOT">
    <description>ROLL MOMENT DERIVATIVE FOR BETA DOT</description>
    <product>
          <property>aero/betadot-rad_sec-limited</property>
          <table>
            <independentVar lookup="row">aero/alpha-deg</independentVar>
            <tableData>
                    -10		    0.12213
                     -5		    0.05392
                      4		  -0.04777
                     10		  -0.10652
                     16		  -0.14362
                     24		  -0.12889
                     50		  -0.09787
                     60		  -0.09923
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            </tableData>
          </table>
       </product>
    </function>
    <function name="aero/c/CMLDED1L">
    <description>ROLLING MOMENT DUE TO ELEVON 1L DEFLECTION</description>
    <product>
          <table>
            <independentVar lookup="row">aero/alpha-deg</independentVar>
            <independentVar lookup="column">fcs/elevon-1L-pos-deg</independentVar>
            <tableData>
                                -25	        -20	        -16	        -15	        -10	         -5	          0	          5	         10	         13	         16
                    -10	  -0.01855	  -0.01616	  -0.01344	  -0.01272	  -0.00938	  -0.00497	    0.00000	    0.00492	    0.00965	    0.01234	    0.01490
                      3	  -0.01545	  -0.01317	  -0.01181	  -0.01121	  -0.00790	  -0.00412	    0.00000	    0.00428	    0.00856	    0.01107	    0.01351
                      9	  -0.02074	  -0.01745	  -0.01443	  -0.01363	  -0.00938	  -0.00479	    0.00000	    0.00487	    0.00964	    0.01239	    0.01494
                     15	  -0.01871	  -0.01527	  -0.01220	  -0.01140	  -0.00721	  -0.00324	    0.00000	    0.00317	    0.00601	    0.00718	    0.00827
                     22	  -0.00809	  -0.00648	  -0.00520	  -0.00488	  -0.00317	  -0.00145	    0.00000	    0.00103	    0.00196	    0.00246	    0.00292
                     45	  -0.00332	  -0.00265	  -0.00209	  -0.00195	  -0.00126	  -0.00060	    0.00000	    0.00052	    0.00094	    0.00115	    0.00133
                     60	  -0.00266	  -0.00210	  -0.00164	  -0.00153	  -0.00096	  -0.00044	    0.00000	    0.00035	    0.00061	    0.00071	    0.00078
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            </tableData>
          </table>
       </product>
    </function>
    <function name="aero/c/CMLDED1R">
    <description>ROLLING MOMENT DUE TO ELEVON 1R DEFLECTION</description>
    <product>
          <table>
            <independentVar lookup="row">aero/alpha-deg</independentVar>
            <independentVar lookup="column">fcs/elevon-1R-pos-deg</independentVar>
            <tableData>
                                -25	        -20	        -16	        -15	        -10	         -5	          0	          5	         10	         13	         16
                    -10	    0.01855	    0.01616	    0.01344	    0.01272	    0.00938	    0.00497	    0.00000	  -0.00492	  -0.00965	  -0.01234	  -0.01490
                      3	    0.01545	    0.01317	    0.01181	    0.01121	    0.00790	    0.00412	    0.00000	  -0.00428	  -0.00856	  -0.01107	  -0.01351
                      9	    0.02074	    0.01745	    0.01443	    0.01363	    0.00938	    0.00479	    0.00000	  -0.00487	  -0.00964	  -0.01239	  -0.01494
                     15	    0.01871	    0.01527	    0.01220	    0.01140	    0.00721	    0.00324	    0.00000	  -0.00317	  -0.00601	  -0.00718	  -0.00827
                     22	    0.00809	    0.00648	    0.00520	    0.00488	    0.00317	    0.00145	    0.00000	  -0.00103	  -0.00196	  -0.00246	  -0.00292
                     45	    0.00332	    0.00265	    0.00209	    0.00195	    0.00126	    0.00060	    0.00000	  -0.00052	  -0.00094	  -0.00115	  -0.00133
                     60	    0.00266	    0.00210	    0.00164	    0.00153	    0.00096	    0.00044	    0.00000	  -0.00035	  -0.00061	  -0.00071	  -0.00078
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            </tableData>
          </table>
       </product>
    </function>
    <function name="aero/c/CMLDED2L">
    <description>ROLLING MOMENT DUE TO ELEVON 2L DEFLECTION</description>
    <product>
          <table>
            <independentVar lookup="row">aero/alpha-deg</independentVar>
            <independentVar lookup="column">fcs/elevon-2L-pos-deg</independentVar>
            <tableData>
                                -25	        -20	        -16	        -15	        -10	         -5	          0	          5	         10	         13	         16
                    -10	  -0.01389	  -0.01157	  -0.00947	  -0.00892	  -0.00604	  -0.00304	    0.00000	    0.00297	    0.00581	    0.00742	    0.00894
                      3	  -0.00928	  -0.00796	  -0.00674	  -0.00640	  -0.00455	  -0.00240	    0.00000	    0.00253	    0.00516	    0.00667	    0.00814
                      9	  -0.01258	  -0.01060	  -0.00877	  -0.00829	  -0.00570	  -0.00292	    0.00000	    0.00298	    0.00594	    0.00766	    0.00932
                     15	  -0.01271	  -0.01042	  -0.00835	  -0.00782	  -0.00536	  -0.00273	    0.00000	    0.00276	    0.00547	    0.00704	    0.00854
                     22	  -0.00901	  -0.00751	  -0.00616	  -0.00581	  -0.00407	  -0.00206	    0.00000	    0.00195	    0.00333	    0.00428	    0.00519
                     45	  -0.00226	  -0.00184	  -0.00148	  -0.00139	  -0.00092	  -0.00046	    0.00000	    0.00042	    0.00080	    0.00100	    0.00117
                     60	  -0.00220	  -0.00177	  -0.00140	  -0.00131	  -0.00085	  -0.00040	    0.00000	    0.00035	    0.00064	    0.00078	    0.00090
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            </tableData>
          </table>
       </product>
    </function>
    <function name="aero/c/CMLDED2R">
    <description>ROLLING MOMENT DUE TO ELEVON 2R DEFLECTION</description>
    <product>
          <table>
            <independentVar lookup="row">aero/alpha-deg</independentVar>
            <independentVar lookup="column">fcs/elevon-2R-pos-deg</independentVar>
            <tableData>
                                -25	        -20	        -16	        -15	        -10	         -5	          0	          5	         10	         13	         16
                    -10	    0.01389	    0.01157	    0.00947	    0.00892	    0.00604	    0.00304	    0.00000	  -0.00297	  -0.00581	  -0.00742	  -0.00894
                      3	    0.00928	    0.00796	    0.00674	    0.00640	    0.00455	    0.00240	    0.00000	  -0.00253	  -0.00516	  -0.00667	  -0.00814
                      9	    0.01258	    0.01060	    0.00877	    0.00829	    0.00570	    0.00292	    0.00000	  -0.00298	  -0.00594	  -0.00766	  -0.00932
                     15	    0.01271	    0.01042	    0.00835	    0.00782	    0.00536	    0.00273	    0.00000	  -0.00276	  -0.00547	  -0.00704	  -0.00854
                     22	    0.00901	    0.00751	    0.00616	    0.00581	    0.00407	    0.00206	    0.00000	  -0.00195	  -0.00333	  -0.00428	  -0.00519
                     45	    0.00226	    0.00184	    0.00148	    0.00139	    0.00092	    0.00046	    0.00000	  -0.00042	  -0.00080	  -0.00100	  -0.00117
                     60	    0.00220	    0.00177	    0.00140	    0.00131	    0.00085	    0.00040	    0.00000	  -0.00035	  -0.00064	  -0.00078	  -0.00090
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            </tableData>
          </table>
       </product>
    </function>
    <function name="aero/c/CMLDRD">
    <description>ROLLING MOMENT DUE TO RUDDER DEFLECTION</description>
    <product>
          <table>
            <independentVar lookup="row">aero/alpha-deg</independentVar>
            <independentVar lookup="column">aero/beta-deg</independentVar>
            <independentVar lookup="table">fcs/rudder-pos-deg</independentVar>
              <tableData breakPoint="-25">
                              -10	        -5	        -2	         0	         2	         5	        10
                    -10	  -0.01154	  -0.01083	  -0.01000	  -0.00935	  -0.00910	  -0.00960	  -0.01028
                      3	  -0.00911	  -0.00850	  -0.00765	  -0.00693	  -0.00637	  -0.00660	  -0.00710
                      9	  -0.00686	  -0.00629	  -0.00585	  -0.00533	  -0.00509	  -0.00520	  -0.00581
                     15	  -0.00530	  -0.00480	  -0.00450	  -0.00399	  -0.00373	  -0.00383	  -0.00434
                     22	  -0.00482	  -0.00466	  -0.00396	  -0.00351	  -0.00337	  -0.00396	  -0.00425
                     45	  -0.00150	  -0.00141	  -0.00135	  -0.00127	  -0.00124	  -0.00136	  -0.00166
                     60	  -0.00007	  -0.00012	  -0.00014	  -0.00015	  -0.00018	  -0.00022	  -0.00028
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              </tableData>
              <tableData breakPoint="-15">
                              -10	        -5	        -2	         0	         2	         5	        10
                    -10	  -0.00733	  -0.00684	  -0.00632	  -0.00599	  -0.00592	  -0.00630	  -0.00675
                      3	  -0.00572	  -0.00528	  -0.00476	  -0.00443	  -0.00419	  -0.00443	  -0.00492
                      9	  -0.00433	  -0.00393	  -0.00367	  -0.00341	  -0.00334	  -0.00346	  -0.00386
                     15	  -0.00333	  -0.00298	  -0.00280	  -0.00255	  -0.00247	  -0.00256	  -0.00291
                     22	  -0.00307	  -0.00293	  -0.00248	  -0.00225	  -0.00223	  -0.00263	  -0.00281
                     45	  -0.00100	  -0.00091	  -0.00087	  -0.00082	  -0.00081	  -0.00089	  -0.00106
                     60	  -0.00007	  -0.00009	  -0.00009	  -0.00009	  -0.00011	  -0.00013	  -0.00016
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              </tableData>
              <tableData breakPoint="-5">
                              -10	        -5	        -2	         0	         2	         5	        10
                    -10	  -0.00246	  -0.00229	  -0.00212	  -0.00204	  -0.00206	  -0.00221	  -0.00238
                      3	  -0.00190	  -0.00172	  -0.00156	  -0.00151	  -0.00149	  -0.00161	  -0.00179
                      9	  -0.00144	  -0.00129	  -0.00122	  -0.00116	  -0.00118	  -0.00124	  -0.00138
                     15	  -0.00110	  -0.00098	  -0.00092	  -0.00087	  -0.00087	  -0.00092	  -0.00105
                     22	  -0.00104	  -0.00098	  -0.00082	  -0.00078	  -0.00079	  -0.00094	  -0.00100
                     45	  -0.00035	  -0.00031	  -0.00030	  -0.00028	  -0.00028	  -0.00031	  -0.00036
                     60	  -0.00003	  -0.00003	  -0.00003	  -0.00003	  -0.00004	  -0.00004	  -0.00005
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              </tableData>
              <tableData breakPoint="0">
                              -10	        -5	        -2	         0	         2	         5	        10
                    -10	    0.00000	    0.00000	    0.00000	    0.00000	    0.00000	    0.00000	    0.00000
                      3	    0.00000	    0.00000	    0.00000	    0.00000	    0.00000	    0.00000	    0.00000
                      9	    0.00000	    0.00000	    0.00000	    0.00000	    0.00000	    0.00000	    0.00000
                     15	    0.00000	    0.00000	    0.00000	    0.00000	    0.00000	    0.00000	    0.00000
                     22	    0.00000	    0.00000	    0.00000	    0.00000	    0.00000	    0.00000	    0.00000
                     45	    0.00000	    0.00000	    0.00000	    0.00000	    0.00000	    0.00000	    0.00000
                     60	    0.00000	    0.00000	    0.00000	    0.00000	    0.00000	    0.00000	    0.00000
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              </tableData>
              <tableData breakPoint="5">
                              -10	        -5	        -2	         0	         2	         5	        10
                    -10	    0.00238	    0.00221	    0.00206	    0.00204	    0.00212	    0.00229	    0.00246
                      3	    0.00179	    0.00161	    0.00149	    0.00151	    0.00156	    0.00172	    0.00190
                      9	    0.00138	    0.00124	    0.00118	    0.00116	    0.00122	    0.00129	    0.00144
                     15	    0.00105	    0.00092	    0.00087	    0.00087	    0.00092	    0.00098	    0.00110
                     22	    0.00100	    0.00094	    0.00079	    0.00078	    0.00082	    0.00098	    0.00104
                     45	    0.00036	    0.00031	    0.00028	    0.00028	    0.00030	    0.00031	    0.00035
                     60	    0.00005	    0.00004	    0.00004	    0.00003	    0.00003	    0.00003	    0.00003
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              </tableData>
              <tableData breakPoint="15">
                              -10	        -5	        -2	         0	         2	         5	        10
                    -10	    0.00675	    0.00630	    0.00592	    0.00599	    0.00632	    0.00684	    0.00733
                      3	    0.00492	    0.00443	    0.00419	    0.00443	    0.00476	    0.00528	    0.00572
                      9	    0.00386	    0.00346	    0.00334	    0.00341	    0.00367	    0.00393	    0.00433
                     15	    0.00291	    0.00256	    0.00247	    0.00255	    0.00280	    0.00298	    0.00333
                     22	    0.00281	    0.00263	    0.00223	    0.00225	    0.00248	    0.00293	    0.00307
                     45	    0.00106	    0.00089	    0.00081	    0.00082	    0.00087	    0.00091	    0.00100
                     60	    0.00016	    0.00013	    0.00011	    0.00009	    0.00009	    0.00009	    0.00007
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              </tableData>
              <tableData breakPoint="25">
                              -10	        -5	        -2	         0	         2	         5	        10
                    -10	    0.01028	    0.00960	    0.00910	    0.00935	    0.01000	    0.01083	    0.01154
                      3	    0.00710	    0.00660	    0.00637	    0.00693	    0.00765	    0.00850	    0.00911
                      9	    0.00581	    0.00520	    0.00509	    0.00533	    0.00585	    0.00629	    0.00686
                     15	    0.00434	    0.00383	    0.00373	    0.00399	    0.00450	    0.00480	    0.00530
                     22	    0.00425	    0.00396	    0.00337	    0.00351	    0.00396	    0.00466	    0.00482
                     45	    0.00166	    0.00136	    0.00124	    0.00127	    0.00135	    0.00141	    0.00150
                     60	    0.00028	    0.00022	    0.00018	    0.00015	    0.00014	    0.00012	    0.00007
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              </tableData>
          </table>
       </product>
    </function>
    <function name="aero/c/CMLDSBL">
    <description>ROLLING MOMENT DUE TO LOWER SPEEDBRAKE DEFLECTION</description>
    <product>
          <table>
            <independentVar lookup="row">aero/alpha-deg</independentVar>
            <independentVar lookup="column">fcs/airbrake-upper</independentVar>
            <tableData>
                                  0	          5	         10	         15	         20	         25	         30	         35	         40	         45	         50	         55
                    -10	  -0.00021	  -0.00013	  -0.00001	  -0.00001	    0.00010	    0.00013	    0.00012	    0.00004	  -0.00002	  -0.00006	  -0.00007	  -0.00005
                      3	    0.00005	  -0.00014	  -0.00007	  -0.00018	  -0.00031	  -0.00045	  -0.00063	  -0.00079	  -0.00092	  -0.00101	  -0.00104	  -0.00099
                      9	    0.00028	    0.00012	  -0.00007	  -0.00028	  -0.00050	  -0.00071	  -0.00093	  -0.00113	  -0.00129	  -0.00140	  -0.00143	  -0.00138
                     15	    0.00034	    0.00025	    0.00009	  -0.00013	  -0.00020	  -0.00026	  -0.00036	  -0.00049	  -0.00059	  -0.00067	  -0.00069	  -0.00065
                     22	    0.00001	    0.00000	  -0.00002	  -0.00006	  -0.00010	  -0.00009	  -0.00019	  -0.00024	  -0.00030	  -0.00034	  -0.00034	  -0.00033
                     45	  -0.00025	  -0.00010	    0.00005	    0.00020	    0.00034	    0.00046	    0.00057	    0.00066	    0.00073	    0.00077	  -0.00048	    0.00075
                     60	  -0.00017	  -0.00009	    0.00000	    0.00009	    0.00017	    0.00024	    0.00031	    0.00036	    0.00040	    0.00042	    0.00042	    0.00041
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            </tableData>
          </table>
       </product>
    </function>
    <function name="aero/c/CMLDSBU">
    <description>ROLLING MOMENT DUE TO UPPER SPEEDBRAKE DEFLECTION</description>
    <product>
          <table>
            <independentVar lookup="row">aero/alpha-deg</independentVar>
            <independentVar lookup="column">fcs/airbrake-lower</independentVar>
            <tableData>
                                  0	          5	         11	         17	         22	         28	         34	         39	         45	         50	         56	         62	         67
                    -10	  -0.00020	  -0.00026	  -0.00034	  -0.00043	  -0.00052	  -0.00059	  -0.00063	  -0.00064	  -0.00065	  -0.00065	  -0.00065	  -0.00064	  -0.00061
                      3	    0.00005	    0.00000	  -0.00020	  -0.00049	  -0.00070	  -0.00087	  -0.00088	  -0.00090	  -0.00091	  -0.00092	  -0.00091	  -0.00089	  -0.00087
                      9	    0.00028	    0.00036	    0.00036	    0.00030	    0.00028	    0.00031	    0.00041	    0.00048	    0.00053	    0.00053	    0.00051	    0.00044	    0.00035
                     15	    0.00036	    0.00042	    0.00042	    0.00036	    0.00032	    0.00032	    0.00034	    0.00038	    0.00043	    0.00043	    0.00041	    0.00035	    0.00032
                     22	    0.00001	  -0.00002	  -0.00009	  -0.00019	  -0.00027	  -0.00030	  -0.00029	  -0.00028	  -0.00027	  -0.00027	  -0.00028	  -0.00029	  -0.00029
                     45	  -0.00022	  -0.00037	  -0.00054	  -0.00068	  -0.00078	  -0.00087	  -0.00093	  -0.00097	  -0.00099	  -0.00099	  -0.00098	  -0.00079	  -0.00090
                     60	  -0.00015	  -0.00022	  -0.00030	  -0.00036	  -0.00039	  -0.00041	  -0.00040	  -0.00042	  -0.00042	  -0.00042	  -0.00042	  -0.00042	  -0.00042
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            </tableData>
          </table>
       </product>
    </function>
    <function name="aero/c/CMLDSD1L">
    <description>ROLLING MOMENT DUE TO LE SLAT 1L DEFLECTION</description>
    <product>
          <table>
            <independentVar lookup="row">aero/alpha-deg</independentVar>
            <independentVar lookup="column">fcs/slat-1L-pos-deg</independentVar>
            <tableData>
                                -17	        -14	        -10	         -7	         -3	          0	          3	          7	         10	         14	         17
                    -10	  -0.00006	  -0.00004	  -0.00002	  -0.00001	    0.00000	    0.00000	    0.00000	    0.00000	  -0.00001	  -0.00002	  -0.00004
                      3	    0.00023	    0.00019	    0.00013	    0.00009	    0.00004	    0.00000	  -0.00003	  -0.00007	  -0.00009	  -0.00012	  -0.00013
                      9	    0.00005	    0.00003	    0.00002	    0.00001	    0.00000	    0.00000	    0.00000	    0.00001	    0.00002	    0.00004	    0.00006
                     15	  -0.00020	  -0.00017	  -0.00013	  -0.00010	  -0.00004	    0.00000	    0.00004	    0.00011	    0.00015	    0.00021	    0.00026
                     22	  -0.00037	  -0.00032	  -0.00023	  -0.00017	  -0.00007	    0.00000	    0.00008	    0.00017	    0.00024	    0.00033	    0.00039
                     45	    0.00010	    0.00008	    0.00006	    0.00004	    0.00002	    0.00000	  -0.00002	  -0.00003	  -0.00004	  -0.00006	  -0.00006
                     60	    0.00003	    0.00002	    0.00003	    0.00002	    0.00001	    0.00000	  -0.00001	  -0.00002	  -0.00002	  -0.00002	  -0.00003
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            </tableData>
          </table>
       </product>
    </function>
    <function name="aero/c/CMLDSD1R">
    <description>ROLLING MOMENT DUE TO LE SLAT 1R DEFLECTION</description>
    <product>
          <table>
            <independentVar lookup="row">aero/alpha-deg</independentVar>
            <independentVar lookup="column">fcs/slat-1R-pos-deg</independentVar>
            <tableData>
                                -17	        -14	        -10	         -7	         -3	          0	          3	          7	         10	         14	         17
                    -10	    0.00006	    0.00004	    0.00002	    0.00001	    0.00000	    0.00000	    0.00000	    0.00000	    0.00001	    0.00002	    0.00004
                      3	  -0.00023	  -0.00019	  -0.00013	  -0.00009	  -0.00004	    0.00000	    0.00003	    0.00007	    0.00009	    0.00012	    0.00013
                      9	  -0.00005	  -0.00003	  -0.00002	  -0.00001	    0.00000	    0.00000	    0.00000	  -0.00001	  -0.00002	  -0.00004	  -0.00006
                     15	    0.00020	    0.00017	    0.00013	    0.00010	    0.00004	    0.00000	  -0.00004	  -0.00011	  -0.00015	  -0.00021	  -0.00026
                     22	    0.00037	    0.00032	    0.00023	    0.00017	    0.00007	    0.00000	  -0.00008	  -0.00017	  -0.00024	  -0.00033	  -0.00039
                     45	  -0.00010	  -0.00008	  -0.00006	  -0.00004	  -0.00002	    0.00000	    0.00002	    0.00003	    0.00004	    0.00006	    0.00006
                     60	  -0.00003	  -0.00002	  -0.00003	  -0.00002	  -0.00001	    0.00000	    0.00001	    0.00002	    0.00002	    0.00002	    0.00003
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            </tableData>
          </table>
       </product>
    </function>
    <function name="aero/c/CMLDSD2L">
    <description>ROLLING MOMENT DUE TO LE SLAT 2L DEFLECTION</description>
    <product>
          <table>
            <independentVar lookup="row">aero/alpha-deg</independentVar>
            <independentVar lookup="column">fcs/slat-2L-pos-deg</independentVar>
            <tableData>
                                -17	        -14	        -10	         -7	         -3	          0	          3	          7	         10	         14	         17
                    -10	  -0.00045	  -0.00037	  -0.00027	  -0.00018	  -0.00008	    0.00000	    0.00007	    0.00016	    0.00022	    0.00028	    0.00032
                      3	    0.00021	    0.00017	    0.00011	    0.00007	    0.00003	    0.00000	  -0.00002	  -0.00004	  -0.00005	  -0.00006	  -0.00006
                      9	  -0.00025	  -0.00022	  -0.00018	  -0.00013	  -0.00006	    0.00000	    0.00007	    0.00016	    0.00023	    0.00033	    0.00041
                     15	  -0.00049	  -0.00041	  -0.00030	  -0.00021	  -0.00009	    0.00000	    0.00009	    0.00022	    0.00032	    0.00044	    0.00053
                     22	    0.00004	    0.00004	    0.00002	    0.00002	    0.00001	    0.00000	  -0.00001	  -0.00001	  -0.00002	  -0.00003	  -0.00004
                     45	    0.00003	    0.00003	    0.00002	    0.00002	    0.00001	    0.00000	  -0.00001	  -0.00002	  -0.00002	  -0.00002	  -0.00002
                     60	    0.00003	    0.00003	    0.00002	    0.00002	    0.00002	    0.00000	  -0.00002	  -0.00002	  -0.00002	  -0.00002	  -0.00002
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            </tableData>
          </table>
       </product>
    </function>
    <function name="aero/c/CMLDSD2R">
    <description>ROLLING MOMENT DUE TO LE SLAT 2R DEFLECTION</description>
    <product>
          <table>
            <independentVar lookup="row">aero/alpha-deg</independentVar>
            <independentVar lookup="column">fcs/slat-2R-pos-deg</independentVar>
            <tableData>
                                -17	        -14	        -10	         -7	         -3	          0	          3	          7	         10	         14	         17
                    -10	    0.00045	    0.00037	    0.00027	    0.00018	    0.00008	    0.00000	  -0.00007	  -0.00016	  -0.00022	  -0.00028	  -0.00032
                      3	  -0.00021	  -0.00017	  -0.00011	  -0.00007	  -0.00003	    0.00000	    0.00002	    0.00004	    0.00005	    0.00006	    0.00006
                      9	    0.00025	    0.00022	    0.00018	    0.00013	    0.00006	    0.00000	  -0.00007	  -0.00016	  -0.00023	  -0.00033	  -0.00041
                     15	    0.00049	    0.00041	    0.00030	    0.00021	    0.00009	    0.00000	  -0.00009	  -0.00022	  -0.00032	  -0.00044	  -0.00053
                     22	  -0.00004	  -0.00004	  -0.00002	  -0.00002	  -0.00001	    0.00000	    0.00001	    0.00001	    0.00002	    0.00003	    0.00004
                     45	  -0.00003	  -0.00003	  -0.00002	  -0.00002	  -0.00001	    0.00000	    0.00001	    0.00002	    0.00002	    0.00002	    0.00002
                     60	  -0.00003	  -0.00003	  -0.00002	  -0.00002	  -0.00002	    0.00000	    0.00002	    0.00002	    0.00002	    0.00002	    0.00002
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            </tableData>
          </table>
       </product>
    </function>
    <function name="aero/c/CMLGEAR">
    <description>ROLLING MOMENT INCREMENT DUE TO GEAR</description>
    <product>
          <property>gear/gear-pos-norm</property>
          <table>
            <independentVar lookup="row">aero/alpha-deg</independentVar>
            <tableData>
                    -10		    0.00000
                     -5		    0.00000
                      3		   0.00000
                      8		   0.00000
                     13		  -0.00003
                     18		  -0.00008
                     25		  -0.00002
                     35		  -0.00005
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            </tableData>
          </table>
       </product>
    </function>
    <function name="aero/c/CMLP">
    <description>ROLL DAMPING DERIVATIVE</description>
    <product>
          <property>aero/pb</property>
          <table>
            <independentVar lookup="row">aero/alpha-deg</independentVar>
            <tableData>
                    -10		  -0.29545
                     -5		  -0.25578
                      4		  -0.22966
                     10		  -0.28651
                     16		  -0.15126
                     24		  -0.00034
                     50		    0.06352
                     60		    0.05749
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            </tableData>
          </table>
       </product>
    </function>
    <function name="aero/c/CMLR">
    <description>ROLLING MOMENT DUE TO YAW RATE</description>
    <product>
          <property>aero/rb</property>
          <table>
            <independentVar lookup="row">aero/alpha-deg</independentVar>
            <tableData>
                    -10		  -0.07609
                     -5		  -0.01391
                      4		    0.06405
                     10		    0.12105
                     16		    0.12341
                     24		    0.08273
                     50		    0.08465
                     60		    0.08519
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            </tableData>
          </table>
       </product>
    </function>
    <function name="aero/c/CFYB">
    <description>BASIC SIDE FORCE</description>
    <product>
          <table>
            <independentVar lookup="row">aero/alpha-deg</independentVar>
            <independentVar lookup="column">aero/beta-deg</independentVar>
            <tableData>
                                -10	         -5	         -2	          0	          2	          5	         10
                    -10	    0.04798	    0.02281	    0.00882	    0.00000	  -0.00882	  -0.02281	  -0.04798
                      3	    0.04210	    0.02107	    0.00866	    0.00000	  -0.00866	  -0.02107	  -0.04210
                      9	    0.04711	    0.02451	    0.00981	    0.00000	  -0.00981	  -0.02451	  -0.04711
                     15	    0.05206	    0.02350	    0.00861	    0.00000	  -0.00861	  -0.02350	  -0.05206
                     22	    0.05228	    0.01917	    0.00731	    0.00000	  -0.00731	  -0.01917	  -0.05228
                     45	    0.06868	    0.03647	    0.01435	    0.00000	  -0.01435	  -0.03647	  -0.06868
                     60	    0.01664	    0.00773	    0.00241	    0.00000	  -0.00241	  -0.00773	  -0.01664
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            </tableData>
          </table>
       </product>
    </function>
    <function name="aero/c/CFYDED1L">
    <description>SIDE FORCE DUE TO ELEVON 1L DEFLECTION</description>
    <product>
          <table>
            <independentVar lookup="row">aero/alpha-deg</independentVar>
            <independentVar lookup="column">fcs/elevon-1L-pos-deg</independentVar>
            <tableData>
                                -25	        -20	        -16	        -15	        -10	         -5	          0	          5	         10	         13	         16
                    -10	  -0.01589	  -0.01324	  -0.01090	  -0.01027	  -0.00664	  -0.00328	    0.00000	    0.00327	    0.00642	    0.00821	    0.00988
                      3	  -0.00173	  -0.00140	  -0.00147	  -0.00139	  -0.00093	  -0.00046	    0.00000	    0.00038	    0.00064	    0.00075	    0.00082
                      9	    0.00230	    0.00201	    0.00171	    0.00163	    0.00116	    0.00061	    0.00000	  -0.00066	  -0.00136	  -0.00179	  -0.00226
                     15	    0.00932	    0.00798	    0.00678	    0.00647	    0.00486	    0.00285	    0.00000	  -0.00271	  -0.00510	  -0.00673	  -0.00822
                     22	    0.02237	    0.01807	    0.01433	    0.01338	    0.00881	    0.00440	    0.00000	  -0.00447	  -0.00849	  -0.01061	  -0.01250
                     45	    0.01727	    0.01382	    0.01094	    0.01021	    0.00661	    0.00319	    0.00000	  -0.00278	  -0.00498	  -0.00607	  -0.00698
                     60	    0.01393	    0.01080	    0.00921	    0.00856	    0.00541	    0.00260	    0.00000	  -0.00212	  -0.00345	  -0.00401	  -0.00439
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            </tableData>
          </table>
       </product>
    </function>
    <function name="aero/c/CFYDED1R">
    <description>SIDE FORCE DUE TO ELEVON 1R DEFLECTION</description>
    <product>
          <table>
            <independentVar lookup="row">aero/alpha-deg</independentVar>
            <independentVar lookup="column">fcs/elevon-1R-pos-deg</independentVar>
            <tableData>
                                -25	        -20	        -16	        -15	        -10	         -5	          0	          5	         10	         13	         16
                    -10	    0.01589	    0.01324	    0.01090	    0.01027	    0.00664	    0.00328	    0.00000	  -0.00327	  -0.00642	  -0.00821	  -0.00988
                      3	    0.00173	    0.00140	    0.00147	    0.00139	    0.00093	    0.00046	    0.00000	  -0.00038	  -0.00064	  -0.00075	  -0.00082
                      9	  -0.00230	  -0.00201	  -0.00171	  -0.00163	  -0.00116	  -0.00061	    0.00000	    0.00066	    0.00136	    0.00179	    0.00226
                     15	  -0.00932	  -0.00798	  -0.00678	  -0.00647	  -0.00486	  -0.00285	    0.00000	    0.00271	    0.00510	    0.00673	    0.00822
                     22	  -0.02237	  -0.01807	  -0.01433	  -0.01338	  -0.00881	  -0.00440	    0.00000	    0.00447	    0.00849	    0.01061	    0.01250
                     45	  -0.01727	  -0.01382	  -0.01094	  -0.01021	  -0.00661	  -0.00319	    0.00000	    0.00278	    0.00498	    0.00607	    0.00698
                     60	  -0.01393	  -0.01080	  -0.00921	  -0.00856	  -0.00541	  -0.00260	    0.00000	    0.00212	    0.00345	    0.00401	    0.00439
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            </tableData>
          </table>
       </product>
    </function>
    <function name="aero/c/CFYDED2L">
    <description>SIDE FORCE DUE TO ELEVON 2L DEFLECTION</description>
    <product>
          <table>
            <independentVar lookup="row">aero/alpha-deg</independentVar>
            <independentVar lookup="column">fcs/elevon-2L-pos-deg</independentVar>
            <tableData>
                                -25	        -20	        -16	        -15	        -10	         -5	          0	          5	         10	         13	         16
                    -10	  -0.00992	  -0.00840	  -0.00700	  -0.00662	  -0.00459	  -0.00237	    0.00000	    0.00243	    0.00485	    0.00626	    0.00761
                      3	  -0.00075	  -0.00072	  -0.00069	  -0.00068	  -0.00060	  -0.00039	    0.00000	    0.00044	    0.00144	    0.00185	    0.00223
                      9	  -0.00026	  -0.00027	  -0.00025	  -0.00025	  -0.00020	  -0.00014	    0.00000	    0.00017	    0.00030	    0.00039	    0.00047
                     15	    0.00205	    0.00185	    0.00168	    0.00162	    0.00111	    0.00058	    0.00000	  -0.00056	  -0.00103	  -0.00130	  -0.00156
                     22	    0.00449	    0.00374	    0.00305	    0.00288	    0.00166	    0.00071	    0.00000	  -0.00082	  -0.00277	  -0.00343	  -0.00406
                     45	    0.02240	    0.01797	    0.01426	    0.01333	    0.00865	    0.00405	    0.00000	  -0.00363	  -0.00705	  -0.00881	  -0.01037
                     60	    0.02063	    0.01642	    0.01292	    0.01205	    0.00774	    0.00371	    0.00000	  -0.00280	  -0.00569	  -0.00690	  -0.00791
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            </tableData>
          </table>
       </product>
    </function>
    <function name="aero/c/CFYDED2R">
    <description>SIDE FORCE DUE TO ELEVON 2R DEFLECTION</description>
    <product>
          <table>
            <independentVar lookup="row">aero/alpha-deg</independentVar>
            <independentVar lookup="column">fcs/elevon-2R-pos-deg</independentVar>
            <tableData>
                                -25	        -20	        -16	        -15	        -10	         -5	          0	          5	         10	         13	         16
                    -10	    0.00992	    0.00840	    0.00700	    0.00662	    0.00459	    0.00237	    0.00000	  -0.00243	  -0.00485	  -0.00626	  -0.00761
                      3	    0.00075	    0.00072	    0.00069	    0.00068	    0.00060	    0.00039	    0.00000	  -0.00044	  -0.00144	  -0.00185	  -0.00223
                      9	    0.00026	    0.00027	    0.00025	    0.00025	    0.00020	    0.00014	    0.00000	  -0.00017	  -0.00030	  -0.00039	  -0.00047
                     15	  -0.00205	  -0.00185	  -0.00168	  -0.00162	  -0.00111	  -0.00058	    0.00000	    0.00056	    0.00103	    0.00130	    0.00156
                     22	  -0.00449	  -0.00374	  -0.00305	  -0.00288	  -0.00166	  -0.00071	    0.00000	    0.00082	    0.00277	    0.00343	    0.00406
                     45	  -0.02240	  -0.01797	  -0.01426	  -0.01333	  -0.00865	  -0.00405	    0.00000	    0.00363	    0.00705	    0.00881	    0.01037
                     60	  -0.02063	  -0.01642	  -0.01292	  -0.01205	  -0.00774	  -0.00371	    0.00000	    0.00280	    0.00569	    0.00690	    0.00791
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            </tableData>
          </table>
       </product>
    </function>
    <function name="aero/c/CFYDRD">
    <description>SIDE FORCE DUE TO RUDDER DEFLECTION</description>
    <product>
          <table>
            <independentVar lookup="row">aero/alpha-deg</independentVar>
            <independentVar lookup="column">fcs/rudder-pos-deg</independentVar>
            <tableData>
                                -25	        -15	         -5	          0	          5	         15	         25
                    -10	    0.04749	    0.03041	    0.01035	    0.00000	  -0.01035	  -0.03041	  -0.04749
                      3	    0.04292	    0.02749	    0.00938	    0.00000	  -0.00938	  -0.02749	  -0.04292
                      9	    0.04408	    0.02838	    0.00973	    0.00000	  -0.00973	  -0.02838	  -0.04408
                     15	    0.03274	    0.02108	    0.00723	    0.00000	  -0.00723	  -0.02108	  -0.03274
                     22	    0.02339	    0.01481	    0.00561	    0.00000	  -0.00561	  -0.01481	  -0.02339
                     45	    0.01089	    0.00743	    0.00141	    0.00000	  -0.00141	  -0.00743	  -0.01089
                     60	    0.00346	    0.00260	    0.00102	    0.00000	  -0.00102	  -0.00260	  -0.00346
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            </tableData>
          </table>
       </product>
    </function>
    <function name="aero/c/CFYDSBL">
    <description>SIDE FORCE DUE TO LOWER SPEEDBRAKE DEFLECTION</description>
    <product>
          <table>
            <independentVar lookup="row">aero/alpha-deg</independentVar>
            <independentVar lookup="column">fcs/airbrake-upper</independentVar>
            <tableData>
                                  0	          5	         10	         15	         20	         25	         30	         35	         40	         45	         50	         55
                    -10	    0.00000	  -0.00020	  -0.00058	  -0.00060	  -0.00109	  -0.00162	  -0.00214	  -0.00263	  -0.00300	  -0.00323	  -0.00329	  -0.00317
                      3	    0.00000	    0.00191	    0.00006	    0.00010	    0.00016	    0.00022	    0.00026	    0.00030	    0.00033	    0.00035	    0.00036	    0.00035
                      9	  -0.00003	    0.00006	    0.00016	    0.00026	    0.00037	    0.00047	    0.00055	    0.00061	    0.00065	    0.00068	    0.00069	    0.00068
                     15	  -0.00032	    0.00000	    0.00037	    0.00112	    0.00188	    0.00215	    0.00233	    0.00249	    0.00261	    0.00269	    0.00271	    0.00267
                     22	  -0.00051	  -0.00026	    0.00000	    0.00028	    0.00057	    0.00069	    0.00068	    0.00089	    0.00101	    0.00108	    0.00110	    0.00106
                     45	    0.00147	    0.00139	    0.00127	    0.00114	    0.00098	    0.00082	    0.00066	    0.00051	    0.00039	    0.00032	  -0.01216	    0.00011
                     60	  -0.00076	  -0.00091	  -0.00108	  -0.00127	  -0.00146	  -0.00164	  -0.00180	  -0.00193	  -0.00203	  -0.00209	  -0.00210	  -0.00207
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            </tableData>
          </table>
       </product>
    </function>
    <function name="aero/c/CFYDSBU">
    <description>SIDE FORCE DUE TO UPPER SPEEDBRAKE DEFLECTION</description>
    <product>
          <table>
            <independentVar lookup="row">aero/alpha-deg</independentVar>
            <independentVar lookup="column">fcs/airbrake-lower</independentVar>
            <tableData>
                                  0	          5	         11	         17	         22	         28	         34	         39	         45	         50	         56	         62	         67
                    -10	  -0.00001	    0.00001	  -0.00038	  -0.00112	  -0.00191	  -0.00297	  -0.00398	  -0.00466	  -0.00517	  -0.00528	  -0.00499	  -0.00427	  -0.00338
                      3	    0.00000	  -0.00001	    0.00000	    0.00004	    0.00007	    0.00011	    0.00015	    0.00017	    0.00019	    0.00020	    0.00019	    0.00016	    0.00013
                      9	    0.00000	    0.00000	    0.00002	    0.00006	    0.00012	    0.00020	    0.00023	    0.00025	    0.00027	    0.00027	    0.00026	    0.00024	    0.00021
                     15	  -0.00035	  -0.00074	  -0.00120	  -0.00161	  -0.00188	  -0.00213	  -0.00231	  -0.00244	  -0.00254	  -0.00256	  -0.00250	  -0.00236	  -0.00221
                     22	  -0.00047	  -0.00067	  -0.00089	  -0.00108	  -0.00122	  -0.00134	  -0.00141	  -0.00145	  -0.00148	  -0.00149	  -0.00147	  -0.00143	  -0.00137
                     45	    0.00146	    0.00152	    0.00158	    0.00161	    0.00162	    0.00163	    0.00164	    0.00164	    0.00164	    0.00164	    0.00164	    0.00344	    0.00164
                     60	  -0.00079	  -0.00066	  -0.00053	  -0.00045	  -0.00040	  -0.00037	  -0.00027	  -0.00036	  -0.00036	  -0.00036	  -0.00036	  -0.00036	  -0.00037
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            </tableData>
          </table>
       </product>
    </function>
    <function name="aero/c/CFYDSD1L">
    <description>SIDE FORCE DUE TO LE SLAT 1L DEFLECTION</description>
    <product>
          <table>
            <independentVar lookup="row">aero/alpha-deg</independentVar>
            <independentVar lookup="column">fcs/slat-1L-pos-deg</independentVar>
            <tableData>
                                -17	        -14	        -10	         -7	         -3	          0	          3	          7	         10	         14	         17
                    -10	    0.00003	    0.00002	    0.00001	    0.00001	    0.00000	    0.00000	    0.00000	    0.00000	    0.00001	    0.00001	    0.00002
                      3	    0.00013	    0.00011	    0.00008	    0.00005	    0.00002	    0.00000	  -0.00002	  -0.00004	  -0.00006	  -0.00007	  -0.00008
                      9	    0.00008	    0.00006	    0.00004	    0.00002	    0.00001	    0.00000	    0.00000	    0.00000	    0.00000	    0.00001	    0.00002
                     15	  -0.00020	  -0.00017	  -0.00012	  -0.00007	    0.00000	    0.00000	    0.00000	    0.00009	    0.00015	    0.00023	    0.00029
                     22	  -0.00136	  -0.00116	  -0.00086	  -0.00062	  -0.00031	    0.00000	    0.00031	    0.00061	    0.00084	    0.00112	    0.00131
                     45	    0.00159	    0.00141	    0.00109	    0.00080	    0.00041	    0.00000	  -0.00039	  -0.00068	  -0.00088	  -0.00107	  -0.00118
                     60	  -0.00078	  -0.00094	    0.00112	    0.00081	    0.00049	    0.00000	  -0.00047	  -0.00064	  -0.00077	  -0.00090	  -0.00096
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            </tableData>
          </table>
       </product>
    </function>
    <function name="aero/c/CFYDSD1R">
    <description>SIDE FORCE DUE TO LE SLAT 1R DEFLECTION</description>
    <product>
          <table>
            <independentVar lookup="row">aero/alpha-deg</independentVar>
            <independentVar lookup="column">fcs/slat-1R-pos-deg</independentVar>
            <tableData>
                                -17	        -14	        -10	         -7	         -3	          0	          3	          7	         10	         14	         17
                    -10	  -0.00003	  -0.00002	  -0.00001	  -0.00001	    0.00000	    0.00000	    0.00000	    0.00000	  -0.00001	  -0.00001	  -0.00002
                      3	  -0.00013	  -0.00011	  -0.00008	  -0.00005	  -0.00002	    0.00000	    0.00002	    0.00004	    0.00006	    0.00007	    0.00008
                      9	  -0.00008	  -0.00006	  -0.00004	  -0.00002	  -0.00001	    0.00000	    0.00000	    0.00000	    0.00000	  -0.00001	  -0.00002
                     15	    0.00020	    0.00017	    0.00012	    0.00007	    0.00000	    0.00000	    0.00000	  -0.00009	  -0.00015	  -0.00023	  -0.00029
                     22	    0.00136	    0.00116	    0.00086	    0.00062	    0.00031	    0.00000	  -0.00031	  -0.00061	  -0.00084	  -0.00112	  -0.00131
                     45	  -0.00159	  -0.00141	  -0.00109	  -0.00080	  -0.00041	    0.00000	    0.00039	    0.00068	    0.00088	    0.00107	    0.00118
                     60	    0.00078	    0.00094	  -0.00112	  -0.00081	  -0.00049	    0.00000	    0.00047	    0.00064	    0.00077	    0.00090	    0.00096
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            </tableData>
          </table>
       </product>
    </function>
    <function name="aero/c/CFYDSD2L">
    <description>SIDE FORCE DUE TO LE SLAT 2L DEFLECTION</description>
    <product>
          <table>
            <independentVar lookup="row">aero/alpha-deg</independentVar>
            <independentVar lookup="column">fcs/slat-2L-pos-deg</independentVar>
            <tableData>
                                -17	        -14	        -10	         -7	         -3	          0	          3	          7	         10	         14	         17
                    -10	  -0.00003	  -0.00003	  -0.00002	  -0.00002	  -0.00001	    0.00000	    0.00001	    0.00003	    0.00005	    0.00007	    0.00009
                      3	    0.00012	    0.00010	    0.00007	    0.00005	    0.00002	    0.00000	  -0.00002	  -0.00004	  -0.00005	  -0.00006	  -0.00007
                      9	    0.00003	    0.00002	    0.00000	    0.00000	    0.00000	    0.00000	    0.00001	    0.00002	    0.00003	    0.00006	    0.00008
                     15	  -0.00001	    0.00007	    0.00020	    0.00029	    0.00026	    0.00000	  -0.00026	  -0.00028	  -0.00019	  -0.00005	    0.00004
                     22	    0.00016	    0.00010	  -0.00003	  -0.00016	    0.00056	    0.00000	  -0.00054	    0.00019	    0.00007	  -0.00005	  -0.00011
                     45	    0.00064	    0.00058	    0.00051	    0.00052	    0.00078	    0.00000	  -0.00082	  -0.00054	  -0.00051	  -0.00052	  -0.00053
                     60	    0.00073	    0.00071	    0.00074	    0.00088	    0.00151	    0.00000	  -0.00160	  -0.00105	  -0.00090	  -0.00081	  -0.00078
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            </tableData>
          </table>
       </product>
    </function>
    <function name="aero/c/CFYDSD2R">
    <description>SIDE FORCE DUE TO LE SLAT 2R DEFLECTION</description>
    <product>
          <table>
            <independentVar lookup="row">aero/alpha-deg</independentVar>
            <independentVar lookup="column">fcs/slat-2R-pos-deg</independentVar>
            <tableData>
                                -17	        -14	        -10	         -7	         -3	          0	          3	          7	         10	         14	         17
                    -10	    0.00003	    0.00003	    0.00002	    0.00002	    0.00001	    0.00000	  -0.00001	  -0.00003	  -0.00005	  -0.00007	  -0.00009
                      3	  -0.00012	  -0.00010	  -0.00007	  -0.00005	  -0.00002	    0.00000	    0.00002	    0.00004	    0.00005	    0.00006	    0.00007
                      9	  -0.00003	  -0.00002	    0.00000	    0.00000	    0.00000	    0.00000	  -0.00001	  -0.00002	  -0.00003	  -0.00006	  -0.00008
                     15	    0.00001	  -0.00007	  -0.00020	  -0.00029	  -0.00026	    0.00000	    0.00026	    0.00028	    0.00019	    0.00005	  -0.00004
                     22	  -0.00016	  -0.00010	    0.00003	    0.00016	  -0.00056	    0.00000	    0.00054	  -0.00019	  -0.00007	    0.00005	    0.00011
                     45	  -0.00064	  -0.00058	  -0.00051	  -0.00052	  -0.00078	    0.00000	    0.00082	    0.00054	    0.00051	    0.00052	    0.00053
                     60	  -0.00073	  -0.00071	  -0.00074	  -0.00088	  -0.00151	    0.00000	    0.00160	    0.00105	    0.00090	    0.00081	    0.00078
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            </tableData>
          </table>
       </product>
    </function>
    <function name="aero/c/CFYGEAR">
    <description>SIDE FORCE INCREMENT DUE TO GEAR</description>
    <product>
          <property>gear/gear-pos-norm</property>
          <table>
            <independentVar lookup="row">aero/alpha-deg</independentVar>
            <tableData>
                    -10		    0.00001
                     -5		    0.00000
                      3		   0.00000
                      8		  -0.00003
                     13		  -0.00015
                     18		    0.00028
                     25		  -0.00061
                     35		    0.00072
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            </tableData>
          </table>
       </product>
    </function>
    <function name="aero/c/CFYP">
    <description>SIDE FORCE DUE TO ROLL RATE</description>
    <product>
          <property>aero/pb</property>
          <table>
            <independentVar lookup="row">aero/alpha-deg</independentVar>
            <tableData>
                    -10		  -0.23127
                     -5		  -0.10814
                      4		    0.03579
                     10		    0.18298
                     16		    0.24388
                     24		    0.18954
                     50		  -0.14250
                     60		  -0.16922
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            </tableData>
          </table>
       </product>
    </function>
    <function name="aero/c/CFYR">
    <description>SIDE FORCE DUE TO YAW RATE</description>
    <product>
          <property>aero/rb</property>
          <table>
            <independentVar lookup="row">aero/alpha-deg</independentVar>
            <tableData>
                    -10		    0.38186
                     -5		    0.37176
                      4		    0.33455
                     10		    0.33324
                     16		    0.30358
                     24		    0.32544
                     50		    0.30120
                     60		    0.25095
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            </tableData>
          </table>
       </product>
    </function>
    <function name="aero/c/CMN1">
    <description>BASIC YAWING MOMENT</description>
    <product>
          <table>
            <independentVar lookup="row">aero/alpha-deg</independentVar>
            <independentVar lookup="column">aero/beta-deg</independentVar>
            <tableData>
                                -10	         -5	         -2	          0	          2	          5	         10
                    -10	  -0.00707	  -0.00242	  -0.00022	    0.00000	    0.00022	    0.00242	    0.00707
                      3	  -0.00080	    0.00057	    0.00044	    0.00000	  -0.00044	  -0.00057	    0.00080
                      9	  -0.00299	  -0.00067	  -0.00016	    0.00000	    0.00016	    0.00067	    0.00299
                     15	  -0.00961	  -0.00398	  -0.00167	    0.00000	    0.00167	    0.00398	    0.00961
                     22	  -0.01295	  -0.00651	  -0.00260	    0.00000	    0.00260	    0.00651	    0.01295
                     45	  -0.01465	  -0.00790	  -0.00308	    0.00000	    0.00308	    0.00790	    0.01465
                     60	  -0.00773	  -0.00515	  -0.00191	    0.00000	    0.00191	    0.00515	    0.00773
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            </tableData>
          </table>
       </product>
    </function>
    <function name="aero/c/CMNBETADOT">
    <description>YAW MOMENT DERIVATIVE FOR BETADOT</description>
    <product>
          <property>aero/betadot-rad_sec-limited</property>
          <table>
            <independentVar lookup="row">aero/alpha-deg</independentVar>
            <tableData>
                    -10		    0.00615
                     -5		    0.00727
                      4		  -0.00610
                     10		    0.01330
                     16		    0.05753
                     24		    0.07050
                     50		    0.07167
                     60		    0.06328
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            </tableData>
          </table>
       </product>
    </function>
    <function name="aero/c/CMNDED1L">
    <description>YAW MOMENT DUE TO ELEVON 1L</description>
    <product>
          <table>
            <independentVar lookup="row">aero/alpha-deg</independentVar>
            <independentVar lookup="column">fcs/elevon-1L-pos-deg</independentVar>
            <tableData>
                                -25	        -20	        -16	        -15	        -10	         -5	          0	          5	         10	         13	         16
                    -10	  -0.00418	  -0.00333	  -0.00265	  -0.00247	  -0.00132	  -0.00058	    0.00000	    0.00047	    0.00079	    0.00091	    0.00098
                      3	  -0.00197	  -0.00151	  -0.00123	  -0.00114	  -0.00067	  -0.00028	    0.00000	    0.00014	    0.00013	    0.00007	  -0.00003
                      9	  -0.00225	  -0.00165	  -0.00120	  -0.00109	  -0.00061	  -0.00024	    0.00000	    0.00012	    0.00013	    0.00009	    0.00000
                     15	  -0.00108	  -0.00061	  -0.00026	  -0.00018	    0.00020	    0.00032	    0.00000	  -0.00037	  -0.00075	  -0.00112	  -0.00146
                     22	    0.00282	    0.00237	    0.00192	    0.00180	    0.00123	    0.00065	    0.00000	  -0.00075	  -0.00146	  -0.00184	  -0.00219
                     45	    0.00366	    0.00296	    0.00236	    0.00221	    0.00145	    0.00071	    0.00000	  -0.00062	  -0.00112	  -0.00136	  -0.00157
                     60	    0.00326	    0.00248	    0.00241	    0.00225	    0.00143	    0.00069	    0.00000	  -0.00057	  -0.00092	  -0.00107	  -0.00117
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            </tableData>
          </table>
       </product>
    </function>
    <function name="aero/c/CMNDED1R">
    <description>YAW MOMENT DUE TO ELEVON 1R</description>
    <product>
          <table>
            <independentVar lookup="row">aero/alpha-deg</independentVar>
            <independentVar lookup="column">fcs/elevon-1R-pos-deg</independentVar>
            <tableData>
                                -25	        -20	        -16	        -15	        -10	         -5	          0	          5	         10	         13	         16
                    -10	    0.00418	    0.00333	    0.00265	    0.00247	    0.00132	    0.00058	    0.00000	  -0.00047	  -0.00079	  -0.00091	  -0.00098
                      3	    0.00197	    0.00151	    0.00123	    0.00114	    0.00067	    0.00028	    0.00000	  -0.00014	  -0.00013	  -0.00007	    0.00003
                      9	    0.00225	    0.00165	    0.00120	    0.00109	    0.00061	    0.00024	    0.00000	  -0.00012	  -0.00013	  -0.00009	    0.00000
                     15	    0.00108	    0.00061	    0.00026	    0.00018	  -0.00020	  -0.00032	    0.00000	    0.00037	    0.00075	    0.00112	    0.00146
                     22	  -0.00282	  -0.00237	  -0.00192	  -0.00180	  -0.00123	  -0.00065	    0.00000	    0.00075	    0.00146	    0.00184	    0.00219
                     45	  -0.00366	  -0.00296	  -0.00236	  -0.00221	  -0.00145	  -0.00071	    0.00000	    0.00062	    0.00112	    0.00136	    0.00157
                     60	  -0.00326	  -0.00248	  -0.00241	  -0.00225	  -0.00143	  -0.00069	    0.00000	    0.00057	    0.00092	    0.00107	    0.00117
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            </tableData>
          </table>
       </product>
    </function>
    <function name="aero/c/CMNDED2L">
    <description>YAW MOMENT DUE TO ELEVON 2L</description>
    <product>
          <table>
            <independentVar lookup="row">aero/alpha-deg</independentVar>
            <independentVar lookup="column">fcs/elevon-2L-pos-deg</independentVar>
            <tableData>
                                -25	        -20	        -16	        -15	        -10	         -5	          0	          5	         10	         13	         16
                    -10	    0.00014	    0.00017	    0.00017	    0.00017	    0.00014	    0.00008	    0.00000	  -0.00013	  -0.00033	  -0.00047	  -0.00063
                      3	  -0.00137	  -0.00107	  -0.00083	  -0.00078	  -0.00050	  -0.00025	    0.00000	    0.00018	    0.00057	    0.00068	    0.00076
                      9	  -0.00354	  -0.00287	  -0.00230	  -0.00215	  -0.00142	  -0.00071	    0.00000	    0.00065	    0.00121	    0.00151	    0.00178
                     15	  -0.00514	  -0.00412	  -0.00323	  -0.00301	  -0.00199	  -0.00097	    0.00000	    0.00091	    0.00176	    0.00221	    0.00263
                     22	  -0.00497	  -0.00402	  -0.00322	  -0.00302	  -0.00204	  -0.00106	    0.00000	    0.00095	    0.00145	    0.00184	    0.00220
                     45	    0.00305	    0.00246	    0.00195	    0.00183	    0.00118	    0.00054	    0.00000	  -0.00048	  -0.00098	  -0.00123	  -0.00146
                     60	    0.00468	    0.00372	    0.00293	    0.00273	    0.00175	    0.00084	    0.00000	  -0.00059	  -0.00129	  -0.00156	  -0.00179
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            </tableData>
          </table>
       </product>
    </function>
    <function name="aero/c/CMNDED2R">
    <description>YAW MOMENT DUE TO ELEVON 2R</description>
    <product>
          <table>
            <independentVar lookup="row">aero/alpha-deg</independentVar>
            <independentVar lookup="column">fcs/elevon-2R-pos-deg</independentVar>
            <tableData>
                                -25	        -20	        -16	        -15	        -10	         -5	          0	          5	         10	         13	         16
                    -10	  -0.00014	  -0.00017	  -0.00017	  -0.00017	  -0.00014	  -0.00008	    0.00000	    0.00013	    0.00033	    0.00047	    0.00063
                      3	    0.00137	    0.00107	    0.00083	    0.00078	    0.00050	    0.00025	    0.00000	  -0.00018	  -0.00057	  -0.00068	  -0.00076
                      9	    0.00354	    0.00287	    0.00230	    0.00215	    0.00142	    0.00071	    0.00000	  -0.00065	  -0.00121	  -0.00151	  -0.00178
                     15	    0.00514	    0.00412	    0.00323	    0.00301	    0.00199	    0.00097	    0.00000	  -0.00091	  -0.00176	  -0.00221	  -0.00263
                     22	    0.00497	    0.00402	    0.00322	    0.00302	    0.00204	    0.00106	    0.00000	  -0.00095	  -0.00145	  -0.00184	  -0.00220
                     45	  -0.00305	  -0.00246	  -0.00195	  -0.00183	  -0.00118	  -0.00054	    0.00000	    0.00048	    0.00098	    0.00123	    0.00146
                     60	  -0.00468	  -0.00372	  -0.00293	  -0.00273	  -0.00175	  -0.00084	    0.00000	    0.00059	    0.00129	    0.00156	    0.00179
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            </tableData>
          </table>
       </product>
    </function>
    <function name="aero/c/CMNDRDr">
    <description>YAWING MOMENT DUE TO RUDDER DEFLECTION</description>
    <product>
          <table>
            <independentVar lookup="row">aero/alpha-deg</independentVar>
            <independentVar lookup="column">aero/beta-deg</independentVar>
            <independentVar lookup="table">fcs/rudder-pos-deg</independentVar>
              <tableData breakPoint="-25">
                              -10	        -5	        -2	         0	         2	         5	        10
                    -10	    0.03680	    0.03454	    0.03161	    0.02923	    0.02859	    0.02998	    0.03215
                      3	    0.03139	    0.02923	    0.02742	    0.02532	    0.02339	    0.02299	    0.02635
                      9	    0.02759	    0.02624	    0.02496	    0.02409	    0.02303	    0.02325	    0.02464
                     15	    0.02592	    0.02470	    0.02445	    0.02474	    0.02279	    0.02246	    0.02407
                     22	    0.02075	    0.02060	    0.01973	    0.01807	    0.01837	    0.01898	    0.01972
                     45	    0.00688	    0.00691	    0.00668	    0.00673	    0.00640	    0.00696	    0.00787
                     60	    0.00043	    0.00066	    0.00078	    0.00198	    0.00097	    0.00117	    0.00158
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              </tableData>
              <tableData breakPoint="-15">
                              -10	        -5	        -2	         0	         2	         5	        10
                    -10	    0.02324	    0.02171	    0.01993	    0.01871	    0.01862	    0.01972	    0.02115
                      3	    0.01975	    0.01817	    0.01711	    0.01620	    0.01533	    0.01541	    0.01716
                      9	    0.01752	    0.01657	    0.01583	    0.01547	    0.01499	    0.01527	    0.01622
                     15	    0.01662	    0.01571	    0.01557	    0.01597	    0.01484	    0.01469	    0.01574
                     22	    0.01336	    0.01314	    0.01257	    0.01150	    0.01197	    0.01241	    0.01285
                     45	    0.00461	    0.00450	    0.00429	    0.00457	    0.00417	    0.00451	    0.00501
                     60	    0.00042	    0.00049	    0.00053	    0.00148	    0.00061	    0.00070	    0.00089
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              </tableData>
              <tableData breakPoint="-5">
                              -10	        -5	        -2	         0	         2	         5	        10
                    -10	    0.00777	    0.00722	    0.00666	    0.00637	    0.00648	    0.00695	    0.00747
                      3	    0.00655	    0.00594	    0.00564	    0.00552	    0.00541	    0.00560	    0.00623
                      9	    0.00590	    0.00555	    0.00534	    0.00530	    0.00521	    0.00538	    0.00573
                     15	    0.00566	    0.00531	    0.00527	    0.00550	    0.00517	    0.00516	    0.00553
                     22	    0.00458	    0.00445	    0.00426	    0.00427	    0.00418	    0.00436	    0.00449
                     45	    0.00165	    0.00156	    0.00147	    0.00093	    0.00146	    0.00156	    0.00169
                     60	    0.00020	    0.00020	    0.00019	    0.00058	    0.00020	    0.00022	    0.00026
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              </tableData>
              <tableData breakPoint="0">
                              -10	        -5	        -2	         0	         2	         5	        10
                    -10	    0.00000	    0.00000	    0.00000	    0.00000	    0.00000	    0.00000	    0.00000
                      3	    0.00000	    0.00000	    0.00000	    0.00000	    0.00000	    0.00000	    0.00000
                      9	    0.00000	    0.00000	    0.00000	    0.00000	    0.00000	    0.00000	    0.00000
                     15	    0.00000	    0.00000	    0.00000	    0.00000	    0.00000	    0.00000	    0.00000
                     22	    0.00000	    0.00000	    0.00000	    0.00000	    0.00000	    0.00000	    0.00000
                     45	    0.00000	    0.00000	    0.00000	    0.00000	    0.00000	    0.00000	    0.00000
                     60	    0.00000	    0.00000	    0.00000	    0.00000	    0.00000	    0.00000	    0.00000
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              </tableData>
              <tableData breakPoint="5">
                              -10	        -5	        -2	         0	         2	         5	        10
                    -10	  -0.00747	  -0.00695	  -0.00648	  -0.00637	  -0.00666	  -0.00722	  -0.00777
                      3	  -0.00623	  -0.00560	  -0.00541	  -0.00552	  -0.00564	  -0.00594	  -0.00655
                      9	  -0.00573	  -0.00538	  -0.00521	  -0.00530	  -0.00534	  -0.00555	  -0.00590
                     15	  -0.00553	  -0.00516	  -0.00517	  -0.00550	  -0.00527	  -0.00531	  -0.00566
                     22	  -0.00449	  -0.00436	  -0.00418	  -0.00427	  -0.00426	  -0.00445	  -0.00458
                     45	  -0.00169	  -0.00156	  -0.00146	  -0.00093	  -0.00147	  -0.00156	  -0.00165
                     60	  -0.00026	  -0.00022	  -0.00020	  -0.00058	  -0.00019	  -0.00020	  -0.00020
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              </tableData>
              <tableData breakPoint="15">
                              -10	        -5	        -2	         0	         2	         5	        10
                    -10	  -0.02115	  -0.01972	  -0.01862	  -0.01871	  -0.01993	  -0.02171	  -0.02324
                      3	  -0.01716	  -0.01541	  -0.01533	  -0.01620	  -0.01711	  -0.01817	  -0.01975
                      9	  -0.01622	  -0.01527	  -0.01499	  -0.01547	  -0.01583	  -0.01657	  -0.01752
                     15	  -0.01574	  -0.01469	  -0.01484	  -0.01597	  -0.01557	  -0.01571	  -0.01662
                     22	  -0.01285	  -0.01241	  -0.01197	  -0.01150	  -0.01257	  -0.01314	  -0.01336
                     45	  -0.00501	  -0.00451	  -0.00417	  -0.00457	  -0.00429	  -0.00450	  -0.00461
                     60	  -0.00089	  -0.00070	  -0.00061	  -0.00148	  -0.00053	  -0.00049	  -0.00042
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              </tableData>
              <tableData breakPoint="25">
                              -10	        -5	        -2	         0	         2	         5	        10
                    -10	  -0.03215	  -0.02998	  -0.02859	  -0.02923	  -0.03161	  -0.03454	  -0.03680
                      3	  -0.02635	  -0.02299	  -0.02339	  -0.02532	  -0.02742	  -0.02923	  -0.03139
                      9	  -0.02464	  -0.02325	  -0.02303	  -0.02409	  -0.02496	  -0.02624	  -0.02759
                     15	  -0.02407	  -0.02246	  -0.02279	  -0.02474	  -0.02445	  -0.02470	  -0.02592
                     22	  -0.01972	  -0.01898	  -0.01837	  -0.01807	  -0.01973	  -0.02060	  -0.02075
                     45	  -0.00787	  -0.00696	  -0.00640	  -0.00673	  -0.00668	  -0.00691	  -0.00688
                     60	  -0.00158	  -0.00117	  -0.00097	  -0.00198	  -0.00078	  -0.00066	  -0.00043
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              </tableData>
          </table>
       </product>
    </function>
    <function name="aero/c/CMNDSBL">
    <description>YAW MOMENT DUE TO LOWER SPEEDBRAKE DEFLECTION</description>
    <product>
          <table>
            <independentVar lookup="row">aero/alpha-deg</independentVar>
            <independentVar lookup="column">fcs/airbrake-upper</independentVar>
            <tableData>
                                  0	          5	         10	         15	         20	         25	         30	         35	         40	         45	         50	         55
                    -10	  -0.00004	  -0.00005	  -0.00011	  -0.00018	  -0.00029	  -0.00042	  -0.00053	  -0.00063	  -0.00071	  -0.00075	  -0.00077	  -0.00074
                      3	    0.00003	    0.00042	  -0.00011	  -0.00019	  -0.00028	  -0.00036	  -0.00043	  -0.00048	  -0.00052	  -0.00054	  -0.00054	  -0.00053
                      9	    0.00014	  -0.00003	  -0.00021	  -0.00039	  -0.00058	  -0.00075	  -0.00090	  -0.00101	  -0.00109	  -0.00114	  -0.00115	  -0.00113
                     15	    0.00013	  -0.00004	  -0.00022	  -0.00043	  -0.00064	  -0.00080	  -0.00094	  -0.00105	  -0.00113	  -0.00117	  -0.00118	  -0.00116
                     22	  -0.00018	  -0.00029	  -0.00040	  -0.00052	  -0.00065	  -0.00081	  -0.00075	  -0.00086	  -0.00092	  -0.00096	  -0.00097	  -0.00095
                     45	    0.00029	    0.00016	    0.00002	  -0.00013	  -0.00028	  -0.00042	  -0.00056	  -0.00068	  -0.00076	  -0.00082	  -0.00121	  -0.00074
                     60	    0.00019	    0.00006	  -0.00008	  -0.00022	  -0.00037	  -0.00052	  -0.00066	  -0.00077	  -0.00086	  -0.00092	  -0.00093	  -0.00091
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            </tableData>
          </table>
       </product>
    </function>
    <function name="aero/c/CMNDSBU">
    <description>YAW MOMENT DUE TO UPPER SPEEDBRAKE DEFLECTION</description>
    <product>
          <table>
            <independentVar lookup="row">aero/alpha-deg</independentVar>
            <independentVar lookup="column">fcs/airbrake-lower</independentVar>
            <tableData>
                                  0	          5	         11	         17	         22	         28	         34	         39	         45	         50	         56	         62	         67
                    -10	  -0.00003	  -0.00007	  -0.00020	  -0.00040	  -0.00061	  -0.00086	  -0.00109	  -0.00124	  -0.00135	  -0.00137	  -0.00131	  -0.00116	  -0.00096
                      3	    0.00003	    0.00007	    0.00010	    0.00010	    0.00010	    0.00010	    0.00011	    0.00012	    0.00012	    0.00012	    0.00012	    0.00011	    0.00010
                      9	    0.00014	    0.00029	    0.00046	    0.00059	    0.00068	    0.00077	    0.00084	    0.00088	    0.00091	    0.00092	    0.00090	    0.00086	    0.00080
                     15	    0.00012	    0.00029	    0.00047	    0.00062	    0.00073	    0.00082	    0.00090	    0.00094	    0.00096	    0.00097	    0.00095	    0.00092	    0.00086
                     22	  -0.00019	  -0.00008	    0.00003	    0.00013	    0.00020	    0.00025	    0.00028	    0.00029	    0.00030	    0.00031	    0.00030	    0.00028	    0.00026
                     45	    0.00028	    0.00040	    0.00053	    0.00064	    0.00071	    0.00077	    0.00082	    0.00084	    0.00085	    0.00086	    0.00085	    0.00071	    0.00079
                     60	    0.00016	    0.00028	    0.00038	    0.00046	    0.00050	    0.00053	    0.00060	    0.00054	    0.00054	    0.00054	    0.00054	    0.00054	    0.00054
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            </tableData>
          </table>
       </product>
    </function>
    <function name="aero/c/CMNDSD1L">
    <description>YAW MOMENT DUE TO LE SLAT 1L</description>
    <product>
          <table>
            <independentVar lookup="row">aero/alpha-deg</independentVar>
            <independentVar lookup="column">fcs/slat-1L-pos-deg</independentVar>
            <tableData>
                                -17	        -14	        -10	         -7	         -3	          0	          3	          7	         10	         14	         17
                    -10	    0.00006	    0.00005	    0.00004	    0.00003	    0.00001	    0.00000	  -0.00001	  -0.00003	  -0.00004	  -0.00005	  -0.00006
                      3	    0.00010	    0.00008	    0.00006	    0.00004	    0.00002	    0.00000	  -0.00002	  -0.00004	  -0.00006	  -0.00008	  -0.00010
                      9	    0.00014	    0.00012	    0.00009	    0.00006	    0.00003	    0.00000	  -0.00003	  -0.00006	  -0.00008	  -0.00011	  -0.00013
                     15	    0.00014	    0.00013	    0.00011	    0.00011	    0.00010	    0.00000	  -0.00010	  -0.00011	  -0.00011	  -0.00012	  -0.00013
                     22	    0.00009	    0.00007	    0.00004	    0.00001	  -0.00004	    0.00000	    0.00005	  -0.00001	  -0.00003	  -0.00005	  -0.00007
                     45	    0.00045	    0.00037	    0.00027	    0.00020	    0.00014	    0.00000	  -0.00014	  -0.00018	  -0.00022	  -0.00027	  -0.00030
                     60	    0.00021	    0.00015	    0.00027	    0.00022	    0.00022	    0.00000	  -0.00024	  -0.00020	  -0.00021	  -0.00023	  -0.00024
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            </tableData>
          </table>
       </product>
    </function>
    <function name="aero/c/CMNDSD1R">
    <description>YAW MOMENT DUE TO LE SLAT 1R</description>
    <product>
          <table>
            <independentVar lookup="row">aero/alpha-deg</independentVar>
            <independentVar lookup="column">fcs/slat-1R-pos-deg</independentVar>
            <tableData>
                                -17	        -14	        -10	         -7	         -3	          0	          3	          7	         10	         14	         17
                    -10	  -0.00006	  -0.00005	  -0.00004	  -0.00003	  -0.00001	    0.00000	    0.00001	    0.00003	    0.00004	    0.00005	    0.00006
                      3	  -0.00010	  -0.00008	  -0.00006	  -0.00004	  -0.00002	    0.00000	    0.00002	    0.00004	    0.00006	    0.00008	    0.00010
                      9	  -0.00014	  -0.00012	  -0.00009	  -0.00006	  -0.00003	    0.00000	    0.00003	    0.00006	    0.00008	    0.00011	    0.00013
                     15	  -0.00014	  -0.00013	  -0.00011	  -0.00011	  -0.00010	    0.00000	    0.00010	    0.00011	    0.00011	    0.00012	    0.00013
                     22	  -0.00009	  -0.00007	  -0.00004	  -0.00001	    0.00004	    0.00000	  -0.00005	    0.00001	    0.00003	    0.00005	    0.00007
                     45	  -0.00045	  -0.00037	  -0.00027	  -0.00020	  -0.00014	    0.00000	    0.00014	    0.00018	    0.00022	    0.00027	    0.00030
                     60	  -0.00021	  -0.00015	  -0.00027	  -0.00022	  -0.00022	    0.00000	    0.00024	    0.00020	    0.00021	    0.00023	    0.00024
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            </tableData>
          </table>
       </product>
    </function>
    <function name="aero/c/CMNDSD2L">
    <description>YAW MOMENT DUE TO LE SLAT 2L</description>
    <product>
          <table>
            <independentVar lookup="row">aero/alpha-deg</independentVar>
            <independentVar lookup="column">fcs/slat-2L-pos-deg</independentVar>
            <tableData>
                                -17	        -14	        -10	         -7	         -3	          0	          3	          7	         10	         14	         17
                    -10	    0.00008	    0.00007	    0.00005	    0.00003	    0.00001	    0.00000	  -0.00001	  -0.00003	  -0.00004	  -0.00005	  -0.00006
                      3	    0.00006	    0.00005	    0.00003	    0.00002	    0.00001	    0.00000	  -0.00001	  -0.00002	  -0.00003	  -0.00004	  -0.00004
                      9	    0.00002	    0.00001	    0.00001	    0.00000	    0.00000	    0.00000	    0.00000	    0.00000	    0.00001	    0.00001	    0.00002
                     15	  -0.00002	  -0.00001	    0.00000	    0.00002	    0.00002	    0.00000	  -0.00002	  -0.00001	    0.00000	    0.00002	    0.00004
                     22	    0.00015	    0.00012	    0.00008	    0.00004	    0.00008	    0.00000	  -0.00008	  -0.00004	  -0.00007	  -0.00011	  -0.00013
                     45	    0.00026	    0.00022	    0.00016	    0.00013	    0.00010	    0.00000	  -0.00011	  -0.00012	  -0.00013	  -0.00016	  -0.00018
                     60	    0.00025	    0.00021	    0.00017	    0.00015	    0.00017	    0.00000	  -0.00018	  -0.00015	  -0.00015	  -0.00016	  -0.00016
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            </tableData>
          </table>
       </product>
    </function>
    <function name="aero/c/CMNDSD2R">
    <description>YAW MOMENT DUE TO LE SLAT 2R</description>
    <product>
          <table>
            <independentVar lookup="row">aero/alpha-deg</independentVar>
            <independentVar lookup="column">fcs/slat-2R-pos-deg</independentVar>
            <tableData>
                                -17	        -14	        -10	         -7	         -3	          0	          3	          7	         10	         14	         17
                    -10	  -0.00008	  -0.00007	  -0.00005	  -0.00003	  -0.00001	    0.00000	    0.00001	    0.00003	    0.00004	    0.00005	    0.00006
                      3	  -0.00006	  -0.00005	  -0.00003	  -0.00002	  -0.00001	    0.00000	    0.00001	    0.00002	    0.00003	    0.00004	    0.00004
                      9	  -0.00002	  -0.00001	  -0.00001	    0.00000	    0.00000	    0.00000	    0.00000	    0.00000	  -0.00001	  -0.00001	  -0.00002
                     15	    0.00002	    0.00001	    0.00000	  -0.00002	  -0.00002	    0.00000	    0.00002	    0.00001	    0.00000	  -0.00002	  -0.00004
                     22	  -0.00015	  -0.00012	  -0.00008	  -0.00004	  -0.00008	    0.00000	    0.00008	    0.00004	    0.00007	    0.00011	    0.00013
                     45	  -0.00026	  -0.00022	  -0.00016	  -0.00013	  -0.00010	    0.00000	    0.00011	    0.00012	    0.00013	    0.00016	    0.00018
                     60	  -0.00025	  -0.00021	  -0.00017	  -0.00015	  -0.00017	    0.00000	    0.00018	    0.00015	    0.00015	    0.00016	    0.00016
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            </tableData>
          </table>
       </product>
    </function>
    <function name="aero/c/CMNGEAR">
    <description>YAWING MOMENT INCREMENT DUE TO GEAR</description>
    <product>
          <property>gear/gear-pos-norm</property>
          <table>
            <independentVar lookup="row">aero/alpha-deg</independentVar>
            <tableData>
                    -10		   0.00000
                     -5		   0.00000
                      3		    0.00000
                      8		    0.00002
                     13		    0.00004
                     18		    0.00037
                     25		    0.00005
                     35		  -0.00001
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            </tableData>
          </table>
       </product>
    </function>
    <function name="aero/c/CMNP">
    <description>YAWING MOMENT DUE TO ROLL RATE</description>
    <product>
          <property>aero/pb</property>
          <table>
            <independentVar lookup="row">aero/alpha-deg</independentVar>
            <tableData>
                    -10		    0.14263
                     -5		    0.08706
                      4		    0.00939
                     10		  -0.05828
                     16		  -0.07324
                     24		  -0.04190
                     50		    0.06949
                     60		    0.08747
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            </tableData>
          </table>
       </product>
    </function>
    <function name="aero/c/CMNR">
    <description>YAW DAMPING DERIVATIVE</description>
    <product>
          <property>aero/rb</property>
          <table>
            <independentVar lookup="row">aero/alpha-deg</independentVar>
            <tableData>
                    -10		  -0.17100
                     -5		  -0.17025
                      4		  -0.15664
                     10		  -0.16017
                     16		  -0.20343
                     24		  -0.20489
                     50		  -0.09400
                     60		  -0.04714
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            </tableData>
          </table>
       </product>
    </function>
    <function name="aero/coefficients/CLIFT">
      <sum>
          <property>aero/c/CFZB</property>
          <property>aero/c/CFZDED1L</property>
          <property>aero/c/CFZDED1R</property>
          <property>aero/c/CFZDE2L</property>
          <property>aero/c/CFZDE2R</property>
          <property>aero/c/CFZDSD1L</property>
          <property>aero/c/CFZDSD1R</property>
          <property>aero/c/CFZDSBU</property>
          <property>aero/c/CFZDEL</property>
          <property>aero/c/CFZGEAR</property>
       </sum>
    </function>
  <axis name="LIFT">
    <function name="aero/force/LIFT">
    <product>
          <property>aero/qbar-psf</property>
          <property>metrics/Sw-sqft</property>
          <property>aero/coefficients/CLIFT</property>
       </product>
    </function>
  </axis>
    <function name="aero/coefficients/CDRAG">
      <sum>
          <property>aero/c/CFXB</property>
          <property>aero/c/CFXDED1L</property>
          <property>aero/c/CFXDED1R</property>
          <property>aero/c/CFXDED2L</property>
          <property>aero/c/CFXDED2R</property>
          <property>aero/c/CFXDSD1L</property>
          <property>aero/c/CFXDSD1R</property>
          <property>aero/c/CFXDSD2L</property>
          <property>aero/c/CFXDSD2R</property>
          <property>aero/c/CFXDSBU</property>
          <property>aero/c/CFXDSBL</property>
          <property>aero/c/CFXGEAR</property>
       </sum>
    </function>
  <axis name="DRAG">
    <function name="aero/force/DRAG">
    <product>
          <property>aero/qbar-psf</property>
          <property>metrics/Sw-sqft</property>
          <property>aero/coefficients/CDRAG</property>
       </product>
    </function>
  </axis>
    <function name="aero/coefficients/CSIDE">
      <sum>
          <property>aero/c/CFYB</property>
          <property>aero/c/CFYP</property>
          <property>aero/c/CFYR</property>
          <property>aero/c/CFYDED1L</property>
          <property>aero/c/CFYDED1R</property>
          <property>aero/c/CFYDED2L</property>
          <property>aero/c/CFYDED2R</property>
          <property>aero/c/CFYDRD</property>
          <property>aero/c/CFYDSD1L</property>
          <property>aero/c/CFYDSD1R</property>
          <property>aero/c/CFYDSD2L</property>
          <property>aero/c/CFYDSD2R</property>
          <property>aero/c/CFYDSBU</property>
          <property>aero/c/CFYDSBL</property>
          <property>aero/c/CFYGEAR</property>
       </sum>
    </function>
  <axis name="SIDE">
    <function name="aero/force/SIDE">
    <product>
          <property>aero/qbar-psf</property>
          <property>metrics/Sw-sqft</property>
          <property>aero/coefficients/CSIDE</property>
       </product>
    </function>
  </axis>
    <function name="aero/coefficients/CROLL">
      <sum>
          <property>aero/c/CML1</property>
          <property>aero/c/CMLP</property>
          <property>aero/c/CMLR</property>
          <property>aero/c/CMLBETADOT</property>
          <property>aero/c/CMLDED1L</property>
          <property>aero/c/CMLDED1R</property>
          <property>aero/c/CMLDED2L</property>
          <property>aero/c/CMLDED2R</property>
          <property>aero/c/CMLDRD</property>
          <property>aero/c/CMLDSD1L</property>
          <property>aero/c/CMLDSD1R</property>
          <property>aero/c/CMLDSD2L</property>
          <property>aero/c/CMLDSD2R</property>
          <property>aero/c/CMLDSBU</property>
          <property>aero/c/CMLDSBL</property>
          <property>aero/c/CMLGEAR</property>
       </sum>
    </function>
  <axis name="ROLL">
    <function name="aero/force/ROLL">
    <product>
          <property>aero/qbar-psf</property>
          <property>metrics/Sw-sqft</property>
          <property>metrics/bw-ft</property>
          <property>aero/coefficients/CROLL</property>
       </product>
    </function>
  </axis>
    <function name="aero/coefficients/CPITCH">
      <sum>
          <property>aero/c/CMM1</property>
          <property>aero/c/CMMQ</property>
          <property>aero/c/CMMALPHADOT</property>
          <property>aero/c/CMMBETADOT</property>
          <property>aero/c/CMMDED1L</property>
          <property>aero/c/CMMDED1R</property>
          <property>aero/c/CMMDED2L</property>
          <property>aero/c/CMMDED2R</property>
          <property>aero/c/CMMDSD1L</property>
          <property>aero/c/CMMDSD1R</property>
          <property>aero/c/CMMDSD2L</property>
          <property>aero/c/CMMDSD2R</property>
          <property>aero/c/CMMDSBU</property>
          <property>aero/c/CMMDSBL</property>
          <property>aero/c/CMMGEAR</property>
       </sum>
    </function>
  <axis name="PITCH">
    <function name="aero/force/PITCH">
    <product>
          <property>aero/qbar-psf</property>
          <property>metrics/Sw-sqft</property>
          <property>metrics/cbarw-ft</property>
          <property>aero/coefficients/CPITCH</property>
       </product>
    </function>
  </axis>
    <function name="aero/coefficients/CYAW">
      <sum>
          <property>aero/c/CMN1</property>
          <property>aero/c/CMNBETADOT</property>
          <property>aero/c/CMNDED1L</property>
          <property>aero/c/CMNDED1R</property>
          <property>aero/c/CMNDED2L</property>
          <property>aero/c/CMNDED2R</property>
          <property>aero/c/CMNDSD1L</property>
          <property>aero/c/CMNDSD1R</property>
          <property>aero/c/CMNDSD2L</property>
          <property>aero/c/CMNDSD2R</property>
          <property>aero/c/CMNDSBU</property>
          <property>aero/c/CMNDSBL</property>
          <property>aero/c/CMNGEAR</property>
          <property>aero/c/CMNDRDr</property>
          <property>aero/c/CMNP</property>
          <property>aero/c/CMNR</property>
       </sum>
    </function>
  <axis name="YAW">
    <function name="aero/force/YAW">
    <product>
          <property>aero/qbar-psf</property>
          <property>metrics/Sw-sqft</property>
          <property>metrics/bw-ft</property>
          <property>aero/coefficients/CYAW</property>
       </product>
    </function>
  </axis>
</aerodynamics>
    <output name="c:/temp/JSBOut.csv" type="CSV" rate="10">\n        <property>aero/alpha-deg</property>
        <property>aero/alphadot-rad_sec-limited</property>
        <property>aero/beta-deg</property>
        <property>aero/betadot-rad_sec-limited</property>
        <property>aero/c/CfMDDED1LZ</property>
        <property>aero/c/CFXB</property>
        <property>aero/c/CFXDED1L</property>
        <property>aero/c/CFXDED1R</property>
        <property>aero/c/CFXDED2L</property>
        <property>aero/c/CFXDED2R</property>
        <property>aero/c/CFXDSBL</property>
        <property>aero/c/CFXDSBU</property>
        <property>aero/c/CFXDSD1L</property>
        <property>aero/c/CFXDSD1R</property>
        <property>aero/c/CFXDSD2L</property>
        <property>aero/c/CFXDSD2R</property>
        <property>aero/c/CFXGEAR</property>
        <property>aero/c/CFYB</property>
        <property>aero/c/CFYDED1L</property>
        <property>aero/c/CFYDED1R</property>
        <property>aero/c/CFYDED2L</property>
        <property>aero/c/CFYDED2R</property>
        <property>aero/c/CFYDRD</property>
        <property>aero/c/CFYDSBL</property>
        <property>aero/c/CFYDSBU</property>
        <property>aero/c/CFYDSD1L</property>
        <property>aero/c/CFYDSD1R</property>
        <property>aero/c/CFYDSD2L</property>
        <property>aero/c/CFYDSD2R</property>
        <property>aero/c/CFYGEAR</property>
        <property>aero/c/CFYP</property>
        <property>aero/c/CFYR</property>
        <property>aero/c/CFZB</property>
        <property>aero/c/CFZDE2L</property>
        <property>aero/c/CFZDE2R</property>
        <property>aero/c/CFZDED1L</property>
        <property>aero/c/CFZDED1R</property>
        <property>aero/c/CFZDEL</property>
        <property>aero/c/CFZDSBU</property>
        <property>aero/c/CFZDSD1L</property>
        <property>aero/c/CFZDSD1R</property>
        <property>aero/c/CFZGEAR</property>
        <property>aero/c/CML1</property>
        <property>aero/c/CMLBETADOT</property>
        <property>aero/c/CMLDED1L</property>
        <property>aero/c/CMLDED1R</property>
        <property>aero/c/CMLDED2L</property>
        <property>aero/c/CMLDED2R</property>
        <property>aero/c/CMLDRD</property>
        <property>aero/c/CMLDSBL</property>
        <property>aero/c/CMLDSBU</property>
        <property>aero/c/CMLDSD1L</property>
        <property>aero/c/CMLDSD1R</property>
        <property>aero/c/CMLDSD2L</property>
        <property>aero/c/CMLDSD2R</property>
        <property>aero/c/CMLGEAR</property>
        <property>aero/c/CMLP</property>
        <property>aero/c/CMLR</property>
        <property>aero/c/CMM1</property>
        <property>aero/c/CMMALPHADOT</property>
        <property>aero/c/CMMBETADOT</property>
        <property>aero/c/CMMDED1L</property>
        <property>aero/c/CMMDED1R</property>
        <property>aero/c/CMMDED2L</property>
        <property>aero/c/CMMDED2R</property>
        <property>aero/c/CMMDSBL</property>
        <property>aero/c/CMMDSBU</property>
        <property>aero/c/CMMDSD1L</property>
        <property>aero/c/CMMDSD1R</property>
        <property>aero/c/CMMDSD2L</property>
        <property>aero/c/CMMDSD2R</property>
        <property>aero/c/CMMGEAR</property>
        <property>aero/c/CMMQ</property>
        <property>aero/c/CMN1</property>
        <property>aero/c/CMNBETADOT</property>
        <property>aero/c/CMNDED1L</property>
        <property>aero/c/CMNDED1R</property>
        <property>aero/c/CMNDED2L</property>
        <property>aero/c/CMNDED2R</property>
        <property>aero/c/CMNDRDr</property>
        <property>aero/c/CMNDSBL</property>
        <property>aero/c/CMNDSBU</property>
        <property>aero/c/CMNDSD1L</property>
        <property>aero/c/CMNDSD1R</property>
        <property>aero/c/CMNDSD2L</property>
        <property>aero/c/CMNDSD2R</property>
        <property>aero/c/CMNGEAR</property>
        <property>aero/c/CMNP</property>
        <property>aero/c/CMNR</property>
        <property>aero/coefficients/CDRAG</property>
        <property>aero/coefficients/CLIFT</property>
        <property>aero/coefficients/CPITCH</property>
        <property>aero/coefficients/CROLL</property>
        <property>aero/coefficients/CSIDE</property>
        <property>aero/coefficients/CYAW</property>
        <property>aero/pb</property>
        <property>aero/qb</property>
        <property>aero/rb</property>
        <property>fcs/airbrake-lower</property>
        <property>fcs/airbrake-upper</property>
        <property>fcs/elevon-1L-pos-deg</property>
        <property>fcs/elevon-1R-pos-deg</property>
        <property>fcs/elevon-2L-pos-deg</property>
        <property>fcs/elevon-2R-pos-deg</property>
        <property>fcs/rudder-pos-deg</property>
        <property>fcs/slat-1L-pos-deg</property>
        <property>fcs/slat-1R-pos-deg</property>
        <property>fcs/slat-2L-pos-deg</property>
        <property>fcs/slat-2R-pos-deg</property>
        <property>gear/gear-pos-norm</property>
    </output>
</fdm_config>
